# OpenSim document version 40500
AnalyzeTool SubjectID:
  model_file: C:\Users\VZW4\OneDrive - University of Pittsburgh\Inverse Dynamics Validation\LFB_model.osim
  replace_force_set: false
  results_directory: .
  output_precision: 3
  initial_time: 0
  final_time: 10000
  solve_for_equilibrium_for_auxiliary_states: false
  maximum_number_of_integrator_steps: 20000
  maximum_integrator_step_size: 1
  minimum_integrator_step_size: 1e-8
  integrator_error_tolerance: 1e-5
  external_loads_file: Vicki_2024-11-22-14-50_L2R_G2G_C1_GRF.xml
  coordinates_file: Vicki_2024-11-22-14-50_L2R_G2G_C1.mot
  lowpass_cutoff_frequency_for_coordinates: -1
  AnalysisSet Analyses:
    JointReaction: start_time=0 end_time=10000 step_interval=1 in_degrees=true joint_names=ALL apply_on_bodies=child
        express_in_frame=ground
    BodyKinematics: start_time=0 end_time=10000 step_interval=1 in_degrees=true bodies=all
        express_results_in_body_local_frame=false
