# OpenSim document version 40500
InverseKinematicsTool:
  time_range: -inf inf
  output_motion_file: C:\OpenSim 4.5\testreplace.mot
  marker_file: V_2024-11-22-14-50_L2R_G2G_C1.trc
  IKTaskSet:
    IKMarkerTask Sternum: apply=true weight=1
    IKMarkerTask R.Acromion: apply=true weight=1
    IKMarkerTask L.Acromion: apply=true weight=1
    IKMarkerTask C7: apply=false weight=1
    IKMarkerTask R.ASIS: apply=true weight=1
    IKMarkerTask L.ASIS: apply=true weight=1
    IKMarkerTask L.PSIS: apply=true weight=1
    IKMarkerTask R.LatKnee: apply=true weight=1
    IKMarkerTask R.MedKnee: apply=true weight=1
    IKMarkerTask R.LatAnkle: apply=true weight=1
    IKMarkerTask R.MedAnkle: apply=true weight=1
    IKMarkerTask R.Heel: apply=true weight=1
    IKMarkerTask R.LatFoot: apply=true weight=1
    IKMarkerTask R.MedFoot: apply=true weight=1
    IKMarkerTask R.Toe: apply=true weight=1
    IKMarkerTask L.LatKnee: apply=true weight=1
    IKMarkerTask L.MedKnee: apply=true weight=1
    IKMarkerTask L.LatAnkle: apply=true weight=1
    IKMarkerTask L.MedAnkle: apply=true weight=1
    IKMarkerTask L.Heel: apply=true weight=1
    IKMarkerTask L.LatFoot: apply=true weight=1
    IKMarkerTask L.MedFoot: apply=true weight=1
    IKMarkerTask L.Toe: apply=true weight=1
    IKMarkerTask R.PSIS: apply=true weight=1
    IKMarkerTask T10: apply=true weight=1
    IKMarkerTask JugularNotch: apply=true weight=1
