# OpenSim document version 40500
MarkerSet:
  Marker Sternum: torso_geom_frame_20 (0.09603972 0.1886652 0.001306886)
  Marker R.Acromion: torso (0.02158637 0.4044376 0.1512634)
  Marker L.Acromion: torso (0.02126969 0.4053142 -0.15062)
  Marker C7: torso_geom_frame_7 (-0.0733735 0.4121518 -0.0004785087)
  Marker R.ASIS: pelvis (0.00346221 0.01298674 0.1260926)
  Marker L.ASIS: pelvis (0.0006946328 0.01207714 -0.1257503)
  Marker L.PSIS: pelvis (-0.1420285 0.03592644 -0.05900004)
  Marker R.LatKnee: femur_r (-0.001881652 -0.4056605 0.04316997)
  Marker R.MedKnee: femur_r (0.0005084375 -0.3973394 -0.0439669)
  Marker R.LatAnkle: tibia_r (-0.004591734 -0.413389 0.04082525)
  Marker R.MedAnkle: tibia_r (0.003658688 -0.3977489 -0.02274023) fixed=true
  Marker R.Heel: calcn_r (0.006010832 0.01043952 -0.00544032)
  Marker R.LatFoot: calcn_r (0.1398898 0.002472817 0.04211136)
  Marker R.MedFoot: calcn_r (0.1854064 0.004204384 -0.0265534)
  Marker R.Toe: calcn_r (0.2521344 -0.005687016 -0.01235097)
  Marker L.LatKnee: femur_l (-0.009212269 -0.4035547 -0.04621361)
  Marker L.MedKnee: femur_l (0.007980236 -0.3998431 0.04600389)
  Marker L.LatAnkle: tibia_l (-0.003823735 -0.4142277 -0.04127272)
  Marker L.MedAnkle: tibia_l (0.009489459 -0.3957281 0.02128377)
  Marker L.Heel: calcn_l (0.005209319 0.01259423 0.003613569)
  Marker L.LatFoot: calcn_l (0.1410173 0.002032349 -0.04321564)
  Marker L.MedFoot: calcn_l (0.1859747 0.004659195 0.02726828)
  Marker L.Toe: calcn_l (0.2508905 -0.001651426 0.01618896)
  Marker R.PSIS: pelvis (-0.1433361 0.03629184 0.05893545)
  Marker T10: torso_geom_frame_11 (-0.08722846 0.1550219 0.001069205)
  Marker JugularNotch: torso (0.03753756 0.3714663 -0.001784899)
