# OpenSim document version 30000
Model LFB Model:
  length_units: meters
  force_units: N
  gravity: 0 -9.80665 0
  credits:
    Delp S.L., Loan J.P., Hoy M.G., Zajac F.E., Topp E.L., Rosen J.M., Thelen D.G., Anderson F.C., Seth A., Hamner S.R., Arnold E., Raabe M.E., Beaucage-Gauvreau E., Brandon, S.C.E., Robertson, W.S.P, Freeman, B.J.C., Graham, R.B., Thewlis, D., Jones, C.F.
  publications:
    Notes: Raabe FBLS model adapted and validated for lifting tasks: https://doi.org/10.1080/10255842.2018.1564819. Validation of an OpenSim full-body model with detailed lumbar spine for estimating lower lumbar spine loads during symmetric and asymmetric lifting tasks.//Raabe Full Body model combines Hamner Full Body Model 2010, Christophy 2012 Lumbar DOF torso, and Arnold patella; 3D, 23 DOF gait model created by D.G. Thelen, Univ. of Wisconsin-Madison, and Samuel Hamner, Ajay Seth, Frank C. Anderson, and Scott L. Delp, Stanford University. Lower extremity joint defintions based on Delp et al. (1990). Low back joint and anthropometry based on Anderson and Pandy (1999, 2001). Planar knee model of Yamaguchi and Zajac (1989). Hamner added arms adapted from Holzbaur et al., 2005. Hamner, S.R., Seth, A, Delp, S.L.: Muscle contributions to propulsion and support during running. Journal of Biomechanics, 2010. Delp, S.L., Loan, J.P., Hoy, M.G., Zajac, F.E., Topp E.L., Rosen, J.M.: An interactive graphics-based model of the lower extremity to study orthopaedic surgical procedures, IEEE Transactions on Biomedical Engineering, vol. 37, pp. 757-767, 1990. Yamaguchi G.T., Zajac F.E.: A planar model of the knee joint to characterize the knee extensor mechanism." J . Biomech. vol. 21. pp. 1-10. 1989. Anderson F.C., Pandy M.G.: A dynamic optimization solution for vertical jumping in three dimensions. Computer Methods in Biomechanics and Biomedical Engineering 2:201-231, 1999. Anderson F.C., Pandy M.G.: Dynamic optimization of human walking. Journal of Biomechanical Engineering 123:381-390, 2001. Holzbaur, KR, WM Murray and SL Delp, 2005. A model of the upper extremity for simulating musculoskeletal surgery and analyzing neuromuscular control. Ann Biomed Eng 33(6): 829-840.
  defaults: Thelen2003Muscle default: max_isometric_force=546 optimal_fiber_length=0.0535 tendon_slack_length=0.078
      pennation_angle_at_optimal=0 [radians] activation_time_constant=0.01 deactivation_time_constant=0.04
      FmaxTendonStrain=0.033 FmaxMuscleStrain=0.6 KshapeActive=0.5 KshapePassive=4 Af=0.3 Flen=1.8
  BodySet:
    Body ground: mass=0 mass_center=(0 0 0) inertia_xx=0 inertia_yy=0 inertia_zz=0
    Body pelvis: mass=11.777 mass_center=(-0.0707 0 0) inertia_xx=0.1028 inertia_yy=0.0871 inertia_zz=0.0579
        meshes=(r_pelvis.vtp l_pelvis.vtp)
      CustomJoint ground_pelvis: parent_body=ground location_in_parent=(0 0 0) location=(0 0 0)
        Coordinate pelvis_tilt: motion_type=rotational default_value=0 range=(-1.570796 1.570796) clamped=false
        Coordinate pelvis_list: motion_type=rotational default_value=0 range=(-1.570796 1.570796) clamped=false
        Coordinate pelvis_rotation: motion_type=rotational default_value=0 range=(-1.570796 1.570796) clamped=false
        Coordinate pelvis_tx: motion_type=translational default_value=0 range=(-5 5) clamped=false
        Coordinate pelvis_ty: motion_type=translational default_value=0 range=(-1 2) clamped=false
        Coordinate pelvis_tz: motion_type=translational default_value=0 range=(-3 3) clamped=false
        SpatialTransform:
          TransformAxis rotation1: coordinates=pelvis_tilt axis=(0 0 1) LinearFunction(coefficients=1 0)
          TransformAxis rotation2: coordinates=pelvis_list axis=(1 0 0) LinearFunction(coefficients=1 0)
          TransformAxis rotation3: coordinates=pelvis_rotation axis=(0 1 0) LinearFunction(coefficients=1 0)
          TransformAxis translation1: coordinates=pelvis_tx axis=(1 0 0) LinearFunction(coefficients=1 0)
          TransformAxis translation2: coordinates=pelvis_ty axis=(0 1 0) LinearFunction(coefficients=1 0)
          TransformAxis translation3: coordinates=pelvis_tz axis=(0 0 1) LinearFunction(coefficients=1 0)
    Body sacrum: mass=0 mass_center=(0 0 0) inertia_xx=0 inertia_yy=0 inertia_zz=0 meshes=sacrum.vtp
      WeldJoint sacrumjnt: parent_body=pelvis location_in_parent=(0.01 -0.017 0) location=(0 0 0)
    Body femur_r: mass=9.3014 mass_center=(0 -0.17 0) inertia_xx=0.1339 inertia_yy=0.0351 inertia_zz=0.1412
        meshes=femur_r.vtp
      CustomJoint hip_r: parent_body=pelvis location_in_parent=(-0.0707 -0.0661 0.0835) location=(0 0 0)
        Coordinate hip_flexion_r: motion_type=rotational default_value=0 range=(-2.4435 2.094395) clamped=false
        Coordinate hip_adduction_r: motion_type=rotational default_value=0 range=(-2.094395 2.094395) clamped=false
        Coordinate hip_rotation_r: motion_type=rotational default_value=0 range=(-2.094395 2.094395) clamped=false
        SpatialTransform: axes_held_at_zero=(translation1 translation2 translation3)
          TransformAxis rotation1: coordinates=hip_flexion_r axis=(0 0 1) LinearFunction(coefficients=1 0)
          TransformAxis rotation2: coordinates=hip_adduction_r axis=(1 0 0) LinearFunction(coefficients=1 0)
          TransformAxis rotation3: coordinates=hip_rotation_r axis=(0 1 0) LinearFunction(coefficients=1 0)
    Body patella_r: mass=0.0862 mass_center=(0.0018 0.0264 0) inertia_xx=2.87e-6 inertia_yy=1.311e-5
        inertia_zz=1.311e-5 meshes=r_patella.vtp
      CustomJoint patellofemoral_r: parent_body=femur_r location_in_parent=(0 0 0) location=(0 0 0)
        Coordinate knee_angle_r_beta: motion_type=rotational default_value=0 range=(-99999.9 99999.9) clamped=false
        SpatialTransform: axes_held_at_zero=(rotation2 rotation3 translation3)
          TransformAxis rotation1: coordinates=knee_angle_r_beta axis=(0 0 1)
            SimmSpline f11: x=(0 0.174533 0.349066 0.523599 0.698132 0.872665 1.0472 1.22173 1.39626 1.5708 1.74533 1.91986 2.0944)
                y=(0.00113686 -0.00629212 -0.105582 -0.253683 -0.414245 -0.579047 -0.747244 -0.91799 -1.09044 -1.26379 -1.43763 -1.61186 -1.78634)
          TransformAxis translation1: coordinates=knee_angle_r_beta axis=(1 0 0)
            SimmSpline f9: x=(0 0.174533 0.349066 0.523599 0.698132 0.872665 1.0472 1.22173 1.39626 1.5708 1.74533 1.91986 2.0944)
                y=(0.04435 0.040692 0.035581 0.029012 0.021473 0.013523 0.005483 -0.002412 -0.009959 -0.016903 -0.022926 -0.027739 -0.030815)
          TransformAxis translation2: coordinates=knee_angle_r_beta axis=(0 1 0)
            SimmSpline f10: x=(0 0.174533 0.349066 0.523599 0.698132 0.872665 1.0472 1.22173 1.39626 1.5708 1.74533 1.91986 2.0944)
                y=(-0.418712 -0.426965 -0.43422 -0.440152 -0.444617 -0.447495 -0.448724 -0.448337 -0.446353 -0.442826 -0.438035 -0.432448 -0.426632)
    Body tibia_r: mass=3.7075 mass_center=(0 -0.1867 0) inertia_xx=0.0504 inertia_yy=0.0051 inertia_zz=0.0511
        meshes=(tibia_r.vtp fibula_r.vtp)
      CustomJoint knee_r: parent_body=femur_r location_in_parent=(0 0 0) location=(0 0 0)
        Coordinate knee_angle_r: motion_type=rotational default_value=0 range=(-2.3562 0.1745329) clamped=false
        SpatialTransform: axes_held_at_zero=(rotation2 rotation3 translation3)
          TransformAxis rotation1: coordinates=knee_angle_r axis=(0 0 1) LinearFunction(coefficients=1 0)
          TransformAxis translation1: coordinates=knee_angle_r axis=(1 0 0)
            SimmSpline: x=(-2.0944 -1.74533 -1.39626 -1.0472 -0.698132 -0.349066 -0.174533 0.197344 0.337395 0.490178 1.52146 2.0944)
                y=(-0.0032 0.00179 0.00411 0.0041 0.00212 -0.001 -0.0031 -0.005227 -0.005435 -0.005574 -0.005435 -0.00525)
          TransformAxis translation2: coordinates=knee_angle_r axis=(0 1 0)
            SimmSpline: x=(-2.0944 -1.22173 -0.523599 -0.349066 -0.174533 0.159149 2.0944)
                y=(-0.4226 -0.4082 -0.399 -0.3976 -0.3966 -0.395264 -0.396)
    Body talus_r: mass=0.1 mass_center=(0 0 0) inertia_xx=0.001 inertia_yy=0.001 inertia_zz=0.001 meshes=talus_rv.vtp
      CustomJoint ankle_r: parent_body=tibia_r location_in_parent=(0 -0.43 0) location=(0 0 0)
        Coordinate ankle_angle_r: motion_type=rotational default_value=0 range=(-1.570796 1.570796) clamped=false
        SpatialTransform: axes_held_at_zero=(rotation2 rotation3 translation1 translation2 translation3)
          TransformAxis rotation1: coordinates=ankle_angle_r axis=(-0.1050135 -0.1740224 0.9791263)
              LinearFunction(coefficients=1 0)
    Body calcn_r: mass=1.25 mass_center=(0.1 0.03 0) inertia_xx=0.0014 inertia_yy=0.0039 inertia_zz=0.0041
        meshes=foot.vtp
      CustomJoint subtalar_r: parent_body=talus_r location_in_parent=(-0.04877 -0.04195 0.00792) location=(0 0 0)
        Coordinate subtalar_angle_r: motion_type=rotational default_value=0 range=(-1.570796 1.570796) clamped=true
            locked=true
        SpatialTransform: axes_held_at_zero=(rotation2 rotation3 translation1 translation2 translation3)
          TransformAxis rotation1: coordinates=subtalar_angle_r axis=(0.7871796 0.6047475 -0.1209495)
              LinearFunction(coefficients=1 0)
    Body toes_r: mass=0.2166 mass_center=(0.0346 0.006 -0.0175) inertia_xx=0.0001 inertia_yy=0.0002 inertia_zz=0.001
        meshes=bofoot.vtp
      CustomJoint mtp_r: parent_body=calcn_r location_in_parent=(0.1788 -0.002 0.00108) location=(0 0 0)
        Coordinate mtp_angle_r: motion_type=rotational default_value=0 range=(-1.570796 1.570796) clamped=true
            locked=true
        SpatialTransform: axes_held_at_zero=(rotation2 rotation3 translation1 translation2 translation3)
          TransformAxis rotation1: coordinates=mtp_angle_r axis=(-0.5809544 0 0.8139361)
              LinearFunction(coefficients=1 0)
    Body femur_l: mass=9.3014 mass_center=(0 -0.17 0) inertia_xx=0.1339 inertia_yy=0.0351 inertia_zz=0.1412
        meshes=femur_l.vtp
      CustomJoint hip_l: parent_body=pelvis location_in_parent=(-0.0707 -0.0661 -0.0835) location=(0 0 0)
        Coordinate hip_flexion_l: motion_type=rotational default_value=0 range=(-2.4435 2.094395) clamped=false
        Coordinate hip_adduction_l: motion_type=rotational default_value=0 range=(-2.094395 2.094395) clamped=false
        Coordinate hip_rotation_l: motion_type=rotational default_value=0 range=(-2.094395 2.094395) clamped=false
        SpatialTransform: axes_held_at_zero=(translation1 translation2 translation3)
          TransformAxis rotation1: coordinates=hip_flexion_l axis=(0 0 1) LinearFunction(coefficients=1 0)
          TransformAxis rotation2: coordinates=hip_adduction_l axis=(-1 0 0) LinearFunction(coefficients=1 0)
          TransformAxis rotation3: coordinates=hip_rotation_l axis=(0 -1 0) LinearFunction(coefficients=1 0)
    Body patella_l: mass=0.0862 mass_center=(0.0018 0.0264 0) inertia_xx=2.87e-6 inertia_yy=1.311e-5
        inertia_zz=1.311e-5 meshes=l_patella.vtp
      CustomJoint patellofemoral_l: parent_body=femur_l location_in_parent=(0 0 0) location=(0 0 0)
        Coordinate knee_angle_l_beta: motion_type=rotational default_value=0 range=(-99999.9 99999.9) clamped=false
        SpatialTransform: axes_held_at_zero=(rotation2 rotation3 translation3)
          TransformAxis rotation1: coordinates=knee_angle_l_beta axis=(0 0 1)
            SimmSpline f25: x=(0 0.174533 0.349066 0.523599 0.698132 0.872665 1.0472 1.22173 1.39626 1.5708 1.74533 1.91986 2.0944)
                y=(0.00113686 -0.00629212 -0.105582 -0.253683 -0.414245 -0.579047 -0.747244 -0.91799 -1.09044 -1.26379 -1.43763 -1.61186 -1.78634)
          TransformAxis translation1: coordinates=knee_angle_l_beta axis=(1 0 0)
            SimmSpline f23: x=(0 0.174533 0.349066 0.523599 0.698132 0.872665 1.0472 1.22173 1.39626 1.5708 1.74533 1.91986 2.0944)
                y=(0.04435 0.040692 0.035581 0.029012 0.021473 0.013523 0.005483 -0.002412 -0.009959 -0.016903 -0.022926 -0.027739 -0.030815)
          TransformAxis translation2: coordinates=knee_angle_l_beta axis=(0 1 0)
            SimmSpline f24: x=(0 0.174533 0.349066 0.523599 0.698132 0.872665 1.0472 1.22173 1.39626 1.5708 1.74533 1.91986 2.0944)
                y=(-0.418712 -0.426965 -0.43422 -0.440152 -0.444617 -0.447495 -0.448724 -0.448337 -0.446353 -0.442826 -0.438035 -0.432448 -0.426632)
    Body tibia_l: mass=3.7075 mass_center=(0 -0.1867 0) inertia_xx=0.0504 inertia_yy=0.0051 inertia_zz=0.0511
        meshes=(tibia_l.vtp fibula_l.vtp)
      CustomJoint knee_l: parent_body=femur_l location_in_parent=(0 0 0) location=(0 0 0)
        Coordinate knee_angle_l: motion_type=rotational default_value=0 range=(-2.3562 0.1745329) clamped=false
        SpatialTransform: axes_held_at_zero=(rotation2 rotation3 translation3)
          TransformAxis rotation1: coordinates=knee_angle_l axis=(0 0 1) LinearFunction(coefficients=1 0)
          TransformAxis translation1: coordinates=knee_angle_l axis=(1 0 0)
            SimmSpline: x=(-2.0944 -1.74533 -1.39626 -1.0472 -0.698132 -0.349066 -0.174533 0.197344 0.337395 0.490178 1.52146 2.0944)
                y=(-0.0032 0.00179 0.00411 0.0041 0.00212 -0.001 -0.0031 -0.005227 -0.005435 -0.005574 -0.005435 -0.00525)
          TransformAxis translation2: coordinates=knee_angle_l axis=(0 1 0)
            SimmSpline: x=(-2.0944 -1.22173 -0.523599 -0.349066 -0.174533 0.159149 2.0944)
                y=(-0.4226 -0.4082 -0.399 -0.3976 -0.3966 -0.395264 -0.396)
    Body talus_l: mass=0.1 mass_center=(0 0 0) inertia_xx=0.001 inertia_yy=0.001 inertia_zz=0.001 meshes=talus_lv.vtp
      CustomJoint ankle_l: parent_body=tibia_l location_in_parent=(0 -0.43 0) location=(0 0 0)
        Coordinate ankle_angle_l: motion_type=rotational default_value=0 range=(-1.047198 1.047198) clamped=false
        SpatialTransform: axes_held_at_zero=(rotation2 rotation3 translation1 translation2 translation3)
          TransformAxis rotation1: coordinates=ankle_angle_l axis=(0.1050135 0.1740224 0.9791263)
              LinearFunction(coefficients=1 0)
    Body calcn_l: mass=1.25 mass_center=(0.1 0.03 0) inertia_xx=0.0014 inertia_yy=0.0039 inertia_zz=0.0041
        meshes=l_foot.vtp
      CustomJoint subtalar_l: parent_body=talus_l location_in_parent=(-0.04877 -0.04195 -0.00792) location=(0 0 0)
        Coordinate subtalar_angle_l: motion_type=rotational default_value=0 range=(-1.570796 1.570796) clamped=true
            locked=true
        SpatialTransform: axes_held_at_zero=(rotation2 rotation3 translation1 translation2 translation3)
          TransformAxis rotation1: coordinates=subtalar_angle_l axis=(-0.7871796 -0.6047475 -0.1209495)
              LinearFunction(coefficients=1 0)
    Body toes_l: mass=0.2166 mass_center=(0.0346 0.006 0.0175) inertia_xx=0.0001 inertia_yy=0.0002 inertia_zz=0.001
        meshes=l_bofoot.vtp
      CustomJoint mtp_l: parent_body=calcn_l location_in_parent=(0.1788 -0.002 -0.00108) location=(0 0 0)
        Coordinate mtp_angle_l: motion_type=rotational default_value=0 range=(-1.047198 1.047198) clamped=true
            locked=true
        SpatialTransform: axes_held_at_zero=(rotation2 rotation3 translation1 translation2 translation3)
          TransformAxis rotation1: coordinates=mtp_angle_l axis=(0.5809544 0 0.8139361)
              LinearFunction(coefficients=1 0)
    Body lumbar5: mass=1.824 mass_center=(0.01728 0.0183 0) inertia_xx=0.1782158 inertia_yy=0.02172737
        inertia_zz=0.1714858 meshes=lumbar5.vtp
      CustomJoint L5_S1_IVDjnt: parent_body=sacrum location_in_parent=(-0.098 0.071 0) location=(0 0 0)
        Coordinate L5_S1_Flex_Ext: motion_type=rotational default_value=0 range=(-0.1954769 0.06352998) clamped=false
        Coordinate L5_S1_Lat_Bending: motion_type=rotational default_value=0 range=(-0.03926991 0.03926991)
            clamped=false
        Coordinate L5_S1_axial_rotation: motion_type=rotational default_value=0 range=(-0.1759292 0.1759292)
            clamped=false
        SpatialTransform: axes_held_at_zero=(translation1 translation2 translation3)
          TransformAxis rotation1: coordinates=L5_S1_Flex_Ext axis=(0 0 1) LinearFunction(coefficients=1 0)
          TransformAxis rotation2: coordinates=L5_S1_Lat_Bending axis=(1 0 0) LinearFunction(coefficients=1 0)
          TransformAxis rotation3: coordinates=L5_S1_axial_rotation axis=(0 1 0) LinearFunction(coefficients=1 0)
    Body lumbar4: mass=1.799 mass_center=(0.0186 0.0217953 0) inertia_xx=0.171208 inertia_yy=0.02067917
        inertia_zz=0.165178 meshes=lumbar4.vtp
      CustomJoint L4_L5_IVDjnt: parent_body=lumbar5 location_in_parent=(0.01 0.0296 0) location=(0.001 -0.0025 0)
        Coordinate L4_L5_Flex_Ext: motion_type=rotational default_value=0 range=(-99999.9 99999.9) clamped=false
        Coordinate L4_L5_Lat_Bending: motion_type=rotational default_value=0 range=(-99999.9 99999.9) clamped=false
        Coordinate L4_L5_axial_rotation: motion_type=rotational default_value=0 range=(-99999.9 99999.9) clamped=false
        SpatialTransform: axes_held_at_zero=(translation1 translation2 translation3)
          TransformAxis rotation1: coordinates=L4_L5_Flex_Ext axis=(0 0 1) LinearFunction(coefficients=1 0)
          TransformAxis rotation2: coordinates=L4_L5_Lat_Bending axis=(1 0 0) LinearFunction(coefficients=1 0)
          TransformAxis rotation3: coordinates=L4_L5_axial_rotation axis=(0 1 0) LinearFunction(coefficients=1 0)
    Body lumbar3: mass=1.67 mass_center=(0.0178939 0.0232739 0) inertia_xx=0.1576974 inertia_yy=0.01991069
        inertia_zz=0.1524474 meshes=lumbar3.vtp
      CustomJoint L3_L4_IVDjnt: parent_body=lumbar4 location_in_parent=(0 0.032 0) location=(-0.0006 -0.0012 0)
        Coordinate L3_L4_Flex_Ext: motion_type=rotational default_value=0 range=(-99999.9 99999.9) clamped=false
        Coordinate L3_L4_Lat_Bending: motion_type=rotational default_value=0 range=(-99999.9 99999.9) clamped=false
        Coordinate L3_L4_axial_rotation: motion_type=rotational default_value=0 range=(-99999.9 99999.9) clamped=false
        SpatialTransform: axes_held_at_zero=(translation1 translation2 translation3)
          TransformAxis rotation1: coordinates=L3_L4_Flex_Ext axis=(0 0 1) LinearFunction(coefficients=1 0)
          TransformAxis rotation2: coordinates=L3_L4_Lat_Bending axis=(1 0 0) LinearFunction(coefficients=1 0)
          TransformAxis rotation3: coordinates=L3_L4_axial_rotation axis=(0 1 0) LinearFunction(coefficients=1 0)
    Body lumbar2: mass=1.689 mass_center=(0.0252462 0.0202124 0) inertia_xx=0.1627048 inertia_yy=0.02197507
        inertia_zz=0.1577048 meshes=lumbar2.vtp
      CustomJoint L2_L3_IVD_jnt: parent_body=lumbar3 location_in_parent=(-0.008 0.0312 0) location=(-0.0013 -0.0039 0)
        Coordinate L2_L3_Flex_Ext: motion_type=rotational default_value=0 range=(-99999.9 99999.9) clamped=false
        Coordinate L2_L3_Lat_Bending: motion_type=rotational default_value=0 range=(-99999.9 99999.9) clamped=false
        Coordinate L2_L3_axial_rotation: motion_type=rotational default_value=0 range=(-99999.9 99999.9) clamped=false
        SpatialTransform: axes_held_at_zero=(translation1 translation2 translation3)
          TransformAxis rotation1: coordinates=L2_L3_Flex_Ext axis=(0 0 1) LinearFunction(coefficients=1 0)
          TransformAxis rotation2: coordinates=L2_L3_Lat_Bending axis=(1 0 0) LinearFunction(coefficients=1 0)
          TransformAxis rotation3: coordinates=L2_L3_axial_rotation axis=(0 1 0) LinearFunction(coefficients=1 0)
    Body lumbar1: mass=1.677 mass_center=(0.03274 0.0194073 0.00132891) inertia_xx=0.162657 inertia_yy=0.02413119
        inertia_zz=0.157927 meshes=lumbar1.vtp
      CustomJoint L1_L2_IVD_jnt: parent_body=lumbar2 location_in_parent=(-0.01 0.025 0) location=(0.0014 -0.0038 0)
        Coordinate L1_L2_Flex_Ext: motion_type=rotational default_value=0 range=(-99999.9 99999.9) clamped=false
        Coordinate L1_L2_Lat_Bending: motion_type=rotational default_value=0 range=(-99999.9 99999.9) clamped=false
        Coordinate L1_L2_axial_rotation: motion_type=rotational default_value=0 range=(-99999.9 99999.9) clamped=false
        SpatialTransform: axes_held_at_zero=(translation1 translation2 translation3)
          TransformAxis rotation1: coordinates=L1_L2_Flex_Ext axis=(0 0 1) LinearFunction(coefficients=1 0)
          TransformAxis rotation2: coordinates=L1_L2_Lat_Bending axis=(1 0 0) LinearFunction(coefficients=1 0)
          TransformAxis rotation3: coordinates=L1_L2_axial_rotation axis=(0 1 0) LinearFunction(coefficients=1 0)
    Body torso: mass=18.1676 mass_center=(-0.03 0.32 0) inertia_xx=1.192387 inertia_yy=0.5133458 inertia_zz=1.163199
        meshes=(cerv1sm.vtp cerv2sm.vtp cerv3sm.vtp cerv4sm.vtp cerv5sm.vtp cerv6sm.vtp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)
      CustomJoint L1_T12_IVD_jnt: parent_body=lumbar1 location_in_parent=(-0.0104 0.0275 0) location=(-0.0129 0.1154 0)
        Coordinate L1_T12_Flex_Ext: motion_type=rotational default_value=0 range=(-99999.9 99999.9) clamped=false
        Coordinate L1_T12_Lat_Bending: motion_type=rotational default_value=0 range=(-99999.9 99999.9) clamped=false
        Coordinate L1_T12_axial_rotation: motion_type=rotational default_value=0 range=(-1.1 1.1) clamped=false
        SpatialTransform: axes_held_at_zero=(translation1 translation2 translation3)
          TransformAxis rotation1: coordinates=L1_T12_Flex_Ext axis=(0 0 1) LinearFunction(coefficients=1 0)
          TransformAxis rotation2: coordinates=L1_T12_Lat_Bending axis=(1 0 0) LinearFunction(coefficients=1 0)
          TransformAxis rotation3: coordinates=L1_T12_axial_rotation axis=(0 1 0) LinearFunction(coefficients=1 0)
      WrapCylinder Cylinder: translation=(-0.208 0.04 0) quadrant=all radius=0.17 length=0.26
      WrapEllipsoid Chest_r: xyz_body_rotation=(0 -0.4 0.2) translation=(0 0.21 0.01) quadrant=z
          dimensions=(0.075 0.17 0.13)
      WrapEllipsoid Chest_l: xyz_body_rotation=(0 0.4 0.2) translation=(0 0.21 -0.01) quadrant=-z
          dimensions=(0.075 0.17 0.13)
    Body Abdomen: mass=0.001 mass_center=(0.008 0 0) inertia_xx=1.78e-6 inertia_yy=5.8e-7 inertia_zz=1.36e-6
      CustomJoint Abdjnt: parent_body=sacrum location_in_parent=(-0.098 0.071 0) location=(-0.09 -0.09 0)
        Coordinate Abs_r3: motion_type=rotational default_value=0 range=(-1.7 1.7) clamped=false
        Coordinate Abs_r2: motion_type=rotational default_value=0 range=(-1.7 1.7) clamped=false
        Coordinate Abs_r1: motion_type=rotational default_value=0 range=(-1.7 1.7) clamped=false
        Coordinate Abs_t1: motion_type=translational default_value=0 range=(-99999.9 99999.9) clamped=false locked=true
        Coordinate Abs_t2: motion_type=translational default_value=0 range=(-99999.9 99999.9) clamped=false locked=true
        SpatialTransform: axes_held_at_zero=translation3
          TransformAxis rotation1: coordinates=Abs_r3 axis=(0 0 1) LinearFunction(coefficients=1 0)
          TransformAxis rotation2: coordinates=Abs_r2 axis=(1 0 0) LinearFunction(coefficients=1 0)
          TransformAxis rotation3: coordinates=Abs_r1 axis=(0 1 0) LinearFunction(coefficients=1 0)
          TransformAxis translation1: coordinates=Abs_t1 axis=(1 0 0) LinearFunction(coefficients=1 0)
          TransformAxis translation2: coordinates=Abs_t2 axis=(0 1 0) LinearFunction(coefficients=1 0)
      WrapEllipsoid Abdomen: translation=(0 0 0) quadrant=x dimensions=(0.01 0.08 0.05)
    Body humerus_r: mass=2.0325 mass_center=(0 -0.164502 0) inertia_xx=0.011946 inertia_yy=0.004121 inertia_zz=0.013409
        meshes=humerus_rv.vtp
      CustomJoint acromial_r: parent_body=torso location_in_parent=(0.003155 0.3715 0.17) location=(0 0 0)
        Coordinate arm_flex_r: motion_type=rotational default_value=0 range=(-1.570796 3.1416) clamped=true
        Coordinate arm_add_r: motion_type=rotational default_value=0 range=(-3.1416 1.570796) clamped=true
        Coordinate arm_rot_r: motion_type=rotational default_value=0 range=(-2.4435 1.7453) clamped=true
        SpatialTransform: axes_held_at_zero=(translation1 translation2 translation3)
          TransformAxis rotation1: coordinates=arm_flex_r axis=(0 0 1) LinearFunction(coefficients=1 0)
          TransformAxis rotation2: coordinates=arm_add_r axis=(1 0 0) LinearFunction(coefficients=1 0)
          TransformAxis rotation3: coordinates=arm_rot_r axis=(0 1 0) LinearFunction(coefficients=1 0)
    Body ulna_r: mass=0.6075 mass_center=(0 -0.120525 0) inertia_xx=0.002962 inertia_yy=0.000618 inertia_zz=0.003213
        meshes=ulna_rv.vtp
      CustomJoint elbow_r: parent_body=humerus_r location_in_parent=(0.013144 -0.286273 -0.009595) location=(0 0 0)
        Coordinate elbow_flex_r: motion_type=rotational default_value=0 range=(-0.1745 2.7925) clamped=true
        SpatialTransform: axes_held_at_zero=(rotation2 rotation3 translation1 translation2 translation3)
          TransformAxis rotation1: coordinates=elbow_flex_r axis=(0.226047 0.022269 0.9738618)
              LinearFunction(coefficients=1 0)
    Body radius_r: mass=0.6075 mass_center=(0 -0.120525 0) inertia_xx=0.002962 inertia_yy=0.000618 inertia_zz=0.003213
        meshes=radius_rv.vtp
      CustomJoint radioulnar_r: parent_body=ulna_r location_in_parent=(-0.006727 -0.013007 0.026083) location=(0 0 0)
        Coordinate pro_sup_r: motion_type=rotational default_value=0 range=(-1.5708 2.0944) clamped=true
        SpatialTransform: axes_held_at_zero=(rotation2 rotation3 translation1 translation2 translation3)
          TransformAxis rotation1: coordinates=pro_sup_r axis=(0.05639803 0.9984065 0.001952)
              LinearFunction(coefficients=1 0)
    Body hand_r: mass=0.4575 mass_center=(0 -0.068095 0) inertia_xx=0.000892 inertia_yy=0.000547 inertia_zz=0.00134
        meshes=(pisiform_rvs.vtp lunate_rvs.vtp scaphoid_rvs.vtp triquetrum_rvs.vtp hamate_rvs.vtp capitate_rvs.vtp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)
      CustomJoint radius_hand_r: parent_body=radius_r location_in_parent=(-0.008797 -0.235841 0.01361) location=(0 0 0)
        Coordinate wrist_flex_r: motion_type=rotational default_value=0 range=(-1.22173 1.22173) clamped=false
            locked=true
        Coordinate wrist_dev_r: motion_type=rotational default_value=0 range=(-0.4363323 0.6108652) clamped=false
            locked=true
        SpatialTransform: axes_held_at_zero=(rotation3 translation1 translation2 translation3)
          TransformAxis rotation1: coordinates=wrist_flex_r axis=(0 0 1) LinearFunction(coefficients=1 0)
          TransformAxis rotation2: coordinates=wrist_dev_r axis=(1 0 0) LinearFunction(coefficients=1 0)
    Body humerus_l: mass=2.0325 mass_center=(0 -0.164502 0) inertia_xx=0.011946 inertia_yy=0.004121 inertia_zz=0.013409
        meshes=humerus_lv.vtp
      CustomJoint acromial_l: parent_body=torso location_in_parent=(0.003155 0.3715 -0.17) location=(0 0 0)
        Coordinate arm_flex_l: motion_type=rotational default_value=0 range=(-1.570796 3.1416) clamped=true
        Coordinate arm_add_l: motion_type=rotational default_value=0 range=(-3.1416 1.570796) clamped=true
        Coordinate arm_rot_l: motion_type=rotational default_value=0 range=(-2.4435 1.7453) clamped=true
        SpatialTransform: axes_held_at_zero=(translation1 translation2 translation3)
          TransformAxis rotation1: coordinates=arm_flex_l axis=(0 0 1) LinearFunction(coefficients=1 0)
          TransformAxis rotation2: coordinates=arm_add_l axis=(-1 0 0) LinearFunction(coefficients=1 0)
          TransformAxis rotation3: coordinates=arm_rot_l axis=(0 -1 0) LinearFunction(coefficients=1 0)
    Body ulna_l: mass=0.6075 mass_center=(0 -0.120525 0) inertia_xx=0.002962 inertia_yy=0.000618 inertia_zz=0.003213
        meshes=ulna_lv.vtp
      CustomJoint elbow_l: parent_body=humerus_l location_in_parent=(0.013144 -0.286273 0.009595) location=(0 0 0)
        Coordinate elbow_flex_l: motion_type=rotational default_value=0 range=(-0.1745 2.7925) clamped=false
        SpatialTransform: axes_held_at_zero=(rotation2 rotation3 translation1 translation2 translation3)
          TransformAxis rotation1: coordinates=elbow_flex_l axis=(-0.226047 -0.022269 0.9738618)
              LinearFunction(coefficients=1 0)
    Body radius_l: mass=0.6075 mass_center=(0 -0.120525 0) inertia_xx=0.002962 inertia_yy=0.000618 inertia_zz=0.003213
        meshes=radius_lv.vtp
      CustomJoint radioulnar_l: parent_body=ulna_l location_in_parent=(-0.006727 -0.013007 -0.026083) location=(0 0 0)
        Coordinate pro_sup_l: motion_type=rotational default_value=0 range=(-1.5708 2.0944) clamped=true
        SpatialTransform: axes_held_at_zero=(rotation2 rotation3 translation1 translation2 translation3)
          TransformAxis rotation1: coordinates=pro_sup_l axis=(-0.05639803 -0.9984065 0.001952)
              LinearFunction(coefficients=1 0)
    Body hand_l: mass=0.4575 mass_center=(0 -0.068095 0) inertia_xx=0.000892 inertia_yy=0.000547 inertia_zz=0.00134
        meshes=(pisiform_lvs.vtp lunate_lvs.vtp scaphoid_lvs.vtp triquetrum_lvs.vtp hamate_lvs.vtp capitate_lvs.vtp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)
      CustomJoint radius_hand_l: parent_body=radius_l location_in_parent=(-0.008797 -0.235841 -0.01361)
          location=(0 0 0)
        Coordinate wrist_flex_l: motion_type=rotational default_value=0 range=(-1.22173 1.22173) clamped=false
            locked=true
        Coordinate wrist_dev_l: motion_type=rotational default_value=0 range=(-0.4363323 0.6108652) clamped=false
            locked=true
        SpatialTransform: axes_held_at_zero=(rotation3 translation1 translation2 translation3)
          TransformAxis rotation1: coordinates=wrist_flex_l axis=(0 0 1) LinearFunction(coefficients=1 0)
          TransformAxis rotation2: coordinates=wrist_dev_l axis=(-1 0 0) LinearFunction(coefficients=1 0)
  ConstraintSet:
    CoordinateCouplerConstraint Abs_r3_con: independent_coordinate_names=L5_S1_Flex_Ext
        dependent_coordinate_name=Abs_r3 scale_factor=1
        coupled_coordinates_function=LinearFunction(coefficients=7.1429 0)
    CoordinateCouplerConstraint Abs_r1_con: independent_coordinate_names=L5_S1_axial_rotation
        dependent_coordinate_name=Abs_r1 scale_factor=1
        coupled_coordinates_function=LinearFunction(coefficients=5.5617 0)
    CoordinateCouplerConstraint Abs_r2_con: independent_coordinate_names=L5_S1_Lat_Bending
        dependent_coordinate_name=Abs_r2 scale_factor=1
        coupled_coordinates_function=LinearFunction(coefficients=11.3122 0)
    CoordinateCouplerConstraint L4_L5_Flex_Ext_con: independent_coordinate_names=L5_S1_Flex_Ext
        dependent_coordinate_name=L4_L5_Flex_Ext scale_factor=1
        coupled_coordinates_function=LinearFunction(coefficients=1.8571 0)
    CoordinateCouplerConstraint L4_L5_axial_rotation_con: independent_coordinate_names=L5_S1_axial_rotation
        dependent_coordinate_name=L4_L5_axial_rotation scale_factor=1
        coupled_coordinates_function=LinearFunction(coefficients=1.0625 0)
    CoordinateCouplerConstraint L4_L5_Lat_Bending_con: independent_coordinate_names=L5_S1_Lat_Bending
        dependent_coordinate_name=L4_L5_Lat_Bending scale_factor=1
        coupled_coordinates_function=LinearFunction(coefficients=1.33 0)
    CoordinateCouplerConstraint L3_L4_Flex_Ext_con: independent_coordinate_names=L5_S1_Flex_Ext
        dependent_coordinate_name=L3_L4_Flex_Ext scale_factor=1
        coupled_coordinates_function=LinearFunction(coefficients=1.6429 0)
    CoordinateCouplerConstraint L3_L4_axial_rotation_con: independent_coordinate_names=L5_S1_axial_rotation
        dependent_coordinate_name=L3_L4_axial_rotation scale_factor=1
        coupled_coordinates_function=LinearFunction(coefficients=1.0625 0)
    CoordinateCouplerConstraint L3_L4_Lat_Bending_con: independent_coordinate_names=L5_S1_Lat_Bending
        dependent_coordinate_name=L3_L4_Lat_Bending scale_factor=1
        coupled_coordinates_function=LinearFunction(coefficients=2.4314 0)
    CoordinateCouplerConstraint L2_L3_Flex_Ext_con: independent_coordinate_names=L5_S1_Flex_Ext
        dependent_coordinate_name=L2_L3_Flex_Ext scale_factor=1
        coupled_coordinates_function=LinearFunction(coefficients=1.1429 0)
    CoordinateCouplerConstraint L2_L3_axial_rotation_con: independent_coordinate_names=L5_S1_axial_rotation
        dependent_coordinate_name=L2_L3_axial_rotation scale_factor=1
        coupled_coordinates_function=LinearFunction(coefficients=0.875 0)
    CoordinateCouplerConstraint L2_L3_Lat_Bending_con: independent_coordinate_names=L5_S1_Lat_Bending
        dependent_coordinate_name=L2_L3_Lat_Bending scale_factor=1
        coupled_coordinates_function=LinearFunction(coefficients=2.4314 0)
    CoordinateCouplerConstraint L1_L2_Flex_Ext_con: independent_coordinate_names=L5_S1_Flex_Ext
        dependent_coordinate_name=L1_L2_Flex_Ext scale_factor=1
        coupled_coordinates_function=LinearFunction(coefficients=0.9286 0)
    CoordinateCouplerConstraint L1_L2_axial_rotation_con: independent_coordinate_names=L5_S1_axial_rotation
        dependent_coordinate_name=L1_L2_axial_rotation scale_factor=1
        coupled_coordinates_function=LinearFunction(coefficients=0.8125 0)
    CoordinateCouplerConstraint L1_L2_Lat_Bending_con: independent_coordinate_names=L5_S1_Lat_Bending
        dependent_coordinate_name=L1_L2_Lat_Bending scale_factor=1
        coupled_coordinates_function=LinearFunction(coefficients=2.0392 0)
    CoordinateCouplerConstraint L1_T12_axial_rotation: independent_coordinate_names=L5_S1_axial_rotation
        dependent_coordinate_name=L1_T12_axial_rotation scale_factor=1
        coupled_coordinates_function=LinearFunction(coefficients=0.75 0)
    CoordinateCouplerConstraint L1_T12_Flex_Ext_con: independent_coordinate_names=L5_S1_Flex_Ext
        dependent_coordinate_name=L1_T12_Flex_Ext scale_factor=1
        coupled_coordinates_function=LinearFunction(coefficients=0.5714 0)
    CoordinateCouplerConstraint L1_T12_Lat_Bending_con: independent_coordinate_names=L5_S1_Lat_Bending
        dependent_coordinate_name=L1_T12_Lat_Bending scale_factor=1
        coupled_coordinates_function=LinearFunction(coefficients=1.549 0)
    CoordinateCouplerConstraint patellofemoral_knee_angle_r_con: independent_coordinate_names=knee_angle_r
        dependent_coordinate_name=knee_angle_r_beta scale_factor=1
        coupled_coordinates_function=LinearFunction(coefficients=-1 0)
    CoordinateCouplerConstraint patellofemoral_knee_angle_l_con: independent_coordinate_names=knee_angle_l
        dependent_coordinate_name=knee_angle_l_beta scale_factor=1
        coupled_coordinates_function=LinearFunction(coefficients=-1 0)
  ForceSet:
    Thelen2003Muscle rect_abd_r: max_isometric_force=662 optimal_fiber_length=0.3034 tendon_slack_length=0.0825
        pennation_angle_at_optimal=0 activation_time_constant=0.01 deactivation_time_constant=0.04
        FmaxTendonStrain=0.033 FmaxMuscleStrain=0.6 KshapeActive=0.5 KshapePassive=4 Af=0.3 Flen=1.8
      PathPoint rect_abd_r_P1: pelvis (-0.026 -0.07 0.011)
      PathPoint rect_abd_r_P2: torso (0.092 0.221982 0.031)
    Thelen2003Muscle rect_abd_l: max_isometric_force=662 optimal_fiber_length=0.3034 tendon_slack_length=0.0825
        pennation_angle_at_optimal=0 activation_time_constant=0.01 deactivation_time_constant=0.04
        FmaxTendonStrain=0.033 FmaxMuscleStrain=0.6 KshapeActive=0.5 KshapePassive=4 Af=0.3 Flen=1.8
      PathPoint rect_abd_l_P1: pelvis (-0.026 -0.07 -0.011)
      PathPoint rect_abd_l_P2: torso (0.092 0.221663 -0.031)
    Thelen2003Muscle Ps_L1_VB_r: max_isometric_force=267.4139 optimal_fiber_length=0.1936 tendon_slack_length=0.0575
        pennation_angle_at_optimal=0.18675
      PathPoint Ps_L1_VB_r_P1: lumbar1 (-0.0101595 0.02327 0.02)
      PathPoint Ps_L1_VB_r_P2: pelvis (-0.0238 -0.057 0.0759)
    Thelen2003Muscle Ps_L1_TP_r: max_isometric_force=77.19164 optimal_fiber_length=0.1907 tendon_slack_length=0.0566
        pennation_angle_at_optimal=0.18675
      PathPoint Ps_L1_TP_r_P1: lumbar1 (-0.02325 0.0146584 0.0226252)
      PathPoint Ps_L1_TP_r_P2: pelvis (-0.0238 -0.057 0.0759)
    Thelen2003Muscle Ps_L1_L2_IVD_r: max_isometric_force=147.1507 optimal_fiber_length=0.1783 tendon_slack_length=0.053
        pennation_angle_at_optimal=0.1867502
      PathPoint Ps_L1_L2_IVD_r_P1: lumbar1 (-0.00125362 0.00350798 0.0206834)
      PathPoint Ps_L1_L2_IVD_r_P2: pelvis (-0.0238 -0.057 0.0759)
    Thelen2003Muscle Ps_L2_TP_r: max_isometric_force=258.58 optimal_fiber_length=0.1658 tendon_slack_length=0.0493
        pennation_angle_at_optimal=0.1867502
      PathPoint Ps_L2_TP_r_P1: lumbar2 (-0.0216214 0.014587 0.022249)
      PathPoint Ps_L2_TP_r_P2: pelvis (-0.0238 -0.057 0.0759)
    Thelen2003Muscle Ps_L2_L3_IVD_r: max_isometric_force=150.5407 optimal_fiber_length=0.1531
        tendon_slack_length=0.0455 pennation_angle_at_optimal=0.1867502
      PathPoint Ps_L2_L3_IVD_r_P1: lumbar2 (0.00196252 0.00338519 0.0214479)
      PathPoint Ps_L2_L3_IVD_r_P2: pelvis (-0.0238 -0.057 0.0759)
    Thelen2003Muscle Ps_L3_TP_r: max_isometric_force=127.7698 optimal_fiber_length=0.1431 tendon_slack_length=0.0425
        pennation_angle_at_optimal=0.1867502
      PathPoint Ps_L3_TP_r_P1: lumbar3 (-0.0245065 0.0207283 0.0282599)
      PathPoint Ps_L3_TP_r_P2: pelvis (-0.0238 -0.057 0.0759)
    Thelen2003Muscle Ps_L3_L4_IVD_r: max_isometric_force=45.35878 optimal_fiber_length=0.1285
        tendon_slack_length=0.0382 pennation_angle_at_optimal=0.1867502
      PathPoint Ps_L3_L4_IVD_r_P1: lumbar3 (0.00115193 0.00621063 0.0211533)
      PathPoint Ps_L3_L4_IVD_r_P2: pelvis (-0.0238 -0.057 0.0759)
    Thelen2003Muscle Ps_L4_TP_r: max_isometric_force=202.6902 optimal_fiber_length=0.1225 tendon_slack_length=0.0364
        pennation_angle_at_optimal=0.1867502
      PathPoint Ps_L4_TP_r_P1: lumbar4 (-0.015649 0.0249464 0.0258768)
      PathPoint Ps_L4_TP_r_P2: pelvis (-0.0238 -0.057 0.0759)
    Thelen2003Muscle Ps_L4_L5_IVD_r: max_isometric_force=85.10187 optimal_fiber_length=0.1047
        tendon_slack_length=0.0311 pennation_angle_at_optimal=0.1867502
      PathPoint Ps_L4_L5_IVD_r_P1: lumbar4 (0.00541963 0.00394754 0.0205966)
      PathPoint Ps_L4_L5_IVD_r_P2: pelvis (-0.0238 -0.057 0.0759)
    Thelen2003Muscle Ps_L5_TP_r: max_isometric_force=186.3623 optimal_fiber_length=0.1034 tendon_slack_length=0.0307
        pennation_angle_at_optimal=0.1867502
      PathPoint Ps_L5_TP_r_P1: lumbar5 (-0.00562001 0.0291398 0.0252881)
      PathPoint Ps_L5_TP_r_P2: pelvis (-0.0238 -0.057 0.0759)
    Thelen2003Muscle Ps_L5_VB_r: max_isometric_force=232.8923 optimal_fiber_length=0.0903 tendon_slack_length=0.0268
        pennation_angle_at_optimal=0.1867502
      PathPoint Ps_L5_VB_r_P1: lumbar5 (0.01 0.01241 0.019)
      PathPoint Ps_L5_VB_r_P2: pelvis (-0.0238 -0.057 0.0759)
    Thelen2003Muscle Ps_L1_VB_l: max_isometric_force=267.4139 optimal_fiber_length=0.1936 tendon_slack_length=0.0575
        pennation_angle_at_optimal=0.18675
      PathPoint Ps_L1_VB_l_P1: lumbar1 (-0.0101595 0.02327 -0.02)
      PathPoint Ps_L1_VB_l_P2: pelvis (-0.0238 -0.057 -0.0759)
    Thelen2003Muscle Ps_L1_TP_l: max_isometric_force=77.19164 optimal_fiber_length=0.1907 tendon_slack_length=0.0566
        pennation_angle_at_optimal=0.18675
      PathPoint Ps_L1_TP_l_P1: lumbar1 (-0.02325 0.0146584 -0.02263)
      PathPoint Ps_L1_TP_l_P2: pelvis (-0.0238 -0.057 -0.0759)
    Thelen2003Muscle Ps_L1_L2_IVD_l: max_isometric_force=147.1507 optimal_fiber_length=0.1783 tendon_slack_length=0.053
        pennation_angle_at_optimal=0.1867502
      PathPoint Ps_L1_L2_IVD_l_P1: lumbar1 (-0.00125362 0.00350798 -0.02068)
      PathPoint Ps_L1_L2_IVD_l_P2: pelvis (-0.0238 -0.057 -0.0759)
    Thelen2003Muscle Ps_L2_TP_l: max_isometric_force=258.58 optimal_fiber_length=0.1658 tendon_slack_length=0.0493
        pennation_angle_at_optimal=0.1867502
      PathPoint Ps_L2_TP_l_P1: lumbar2 (-0.0216214 0.014587 -0.02225)
      PathPoint Ps_L2_TP_l_P2: pelvis (-0.0238 -0.057 -0.0759)
    Thelen2003Muscle Ps_L2_L3_IVD_l: max_isometric_force=150.5407 optimal_fiber_length=0.1531
        tendon_slack_length=0.0455 pennation_angle_at_optimal=0.1867502
      PathPoint Ps_L2_L3_IVD_l_P1: lumbar2 (0.00196252 0.00338519 -0.02145)
      PathPoint Ps_L2_L3_IVD_l_P2: pelvis (-0.0238 -0.057 -0.0759)
    Thelen2003Muscle Ps_L3_TP_l: max_isometric_force=127.7698 optimal_fiber_length=0.1431 tendon_slack_length=0.0425
        pennation_angle_at_optimal=0.1867502
      PathPoint Ps_L3_TP_l_P1: lumbar3 (-0.0245065 0.0207283 -0.02826)
      PathPoint Ps_L3_TP_l_P2: pelvis (-0.0238 -0.057 -0.0759)
    Thelen2003Muscle Ps_L3_L4_IVD_l: max_isometric_force=45.35878 optimal_fiber_length=0.1285
        tendon_slack_length=0.0382 pennation_angle_at_optimal=0.1867502
      PathPoint Ps_L3_L4_IVD_l_P1: lumbar3 (0.00115193 0.00621063 -0.02115)
      PathPoint Ps_L3_L4_IVD_l_P2: pelvis (-0.0238 -0.057 -0.0759)
    Thelen2003Muscle Ps_L4_TP_l: max_isometric_force=202.6902 optimal_fiber_length=0.1225 tendon_slack_length=0.0364
        pennation_angle_at_optimal=0.1867502
      PathPoint Ps_L4_TP_l_P1: lumbar4 (-0.015649 0.0249464 -0.02588)
      PathPoint Ps_L4_TP_l_P2: pelvis (-0.0238 -0.057 -0.0759)
    Thelen2003Muscle Ps_L4_L5_IVD_l: max_isometric_force=85.10187 optimal_fiber_length=0.1047
        tendon_slack_length=0.0311 pennation_angle_at_optimal=0.1867502
      PathPoint Ps_L4_L5_IVD_l_P1: lumbar4 (0.00541963 0.00394754 -0.0206)
      PathPoint Ps_L4_L5_IVD_l_P2: pelvis (-0.0238 -0.057 -0.0759)
    Thelen2003Muscle Ps_L5_TP_l: max_isometric_force=186.3623 optimal_fiber_length=0.1034 tendon_slack_length=0.0307
        pennation_angle_at_optimal=0.1867502
      PathPoint Ps_L5_TP_l_P1: lumbar5 (-0.00562001 0.0291398 -0.02529)
      PathPoint Ps_L5_TP_l_P2: pelvis (-0.0238 -0.057 -0.0759)
    Thelen2003Muscle Ps_L5_VB_l: max_isometric_force=232.8923 optimal_fiber_length=0.0903 tendon_slack_length=0.0268
        pennation_angle_at_optimal=0.1867502
      PathPoint Ps_L5_VB_l_P1: lumbar5 (0.01 0.01241 -0.019)
      PathPoint Ps_L5_VB_l_P2: pelvis (-0.0238 -0.057 -0.0759)
    Thelen2003Muscle QL_post_I_1_L3_r: max_isometric_force=75.59353 optimal_fiber_length=0.0442
        tendon_slack_length=0.0371 pennation_angle_at_optimal=0.1291544
      PathPoint I_1_r_P1: pelvis (-0.112 0.077 0.059)
      PathPoint L3_TP_r_P2: lumbar3 (-0.029 0.01963 0.0303)
    Thelen2003Muscle QL_post_I_2_L4_r: max_isometric_force=156.4149 optimal_fiber_length=0.0253
        tendon_slack_length=0.0213 pennation_angle_at_optimal=0.1291544
      PathPoint I_2_r_P1: pelvis (-0.106 0.081 0.063)
      PathPoint L4_TP_r_P2: lumbar4 (-0.022 0.02605 0.0303)
    Thelen2003Muscle QL_post_I_2_L3_r: max_isometric_force=58.56422 optimal_fiber_length=0.0396
        tendon_slack_length=0.0333 pennation_angle_at_optimal=0.1291544
      PathPoint I_2_r_P1: pelvis (-0.106 0.081 0.063)
      PathPoint L3_TP_r_P2: lumbar3 (-0.029 0.01963 0.0303)
    Thelen2003Muscle QL_post_I_2_L2_r: max_isometric_force=36.55072 optimal_fiber_length=0.0571
        tendon_slack_length=0.048 pennation_angle_at_optimal=0.1291544
      PathPoint I_2_r_P1: pelvis (-0.106 0.081 0.063)
      PathPoint L2_TP_r_P2: lumbar2 (-0.031 0.012 0.0303)
    Thelen2003Muscle QL_post_I_3_L1_r: max_isometric_force=77.19129 optimal_fiber_length=0.0775
        tendon_slack_length=0.0651 pennation_angle_at_optimal=0.1291544
      PathPoint L1_TP_P1: lumbar1 (-0.032 0.014 0.032)
      PathPoint I_3_r_P1: pelvis (-0.098 0.089 0.066)
    Thelen2003Muscle QL_post_I_3_L2_r: max_isometric_force=56.48747 optimal_fiber_length=0.0565
        tendon_slack_length=0.0474 pennation_angle_at_optimal=0.1291544
      PathPoint L2_TP_r_P2: lumbar2 (-0.031 0.012 0.0303)
      PathPoint I_3_r_P1: pelvis (-0.098 0.089 0.066)
    Thelen2003Muscle QL_post_I_3_L3_r: max_isometric_force=96.36098 optimal_fiber_length=0.0399
        tendon_slack_length=0.0335 pennation_angle_at_optimal=0.1291544
      PathPoint L3_TP_r_P2: lumbar3 (-0.029 0.01963 0.0303)
      PathPoint I_3_r_P1: pelvis (-0.098 0.089 0.066)
    Thelen2003Muscle QL_post_I_1_L3_l: max_isometric_force=75.59353 optimal_fiber_length=0.0442
        tendon_slack_length=0.0371 pennation_angle_at_optimal=0.1291544
      PathPoint I.1_l_P1: pelvis (-0.113577 0.0794995 -0.0581971)
      PathPoint L3_TP_l_P2: lumbar3 (-0.029 0.02 -0.0303)
    Thelen2003Muscle QL_post_I_2_L4_l: max_isometric_force=156.4149 optimal_fiber_length=0.0253
        tendon_slack_length=0.0213 pennation_angle_at_optimal=0.1291544
      PathPoint I_2_l_P1: pelvis (-0.106 0.081 -0.063)
      PathPoint L4_TP_l_P2: lumbar4 (-0.022 0.02605 -0.03)
    Thelen2003Muscle QL_post_I_2_L3_l: max_isometric_force=58.56422 optimal_fiber_length=0.0396
        tendon_slack_length=0.0333 pennation_angle_at_optimal=0.1291544
      PathPoint I_2_l_P1: pelvis (-0.106 0.081 -0.063)
      PathPoint L3_TP_l_P2: lumbar3 (-0.029 0.01963 -0.0303)
    Thelen2003Muscle QL_post_I_2_L2_l: max_isometric_force=36.55072 optimal_fiber_length=0.0571
        tendon_slack_length=0.048 pennation_angle_at_optimal=0.1291544
      PathPoint I_2_l_P1: pelvis (-0.106 0.081 -0.063)
      PathPoint L2_TP_l_P2: lumbar2 (-0.031 0.012 -0.0303)
    Thelen2003Muscle QL_post_I_3_L1_l: max_isometric_force=77.19129 optimal_fiber_length=0.0775
        tendon_slack_length=0.0651 pennation_angle_at_optimal=0.1291544
      PathPoint L1_TP_l_P1: lumbar1 (-0.0318695 0.0143282 -0.032)
      PathPoint I_3_l_P1: pelvis (-0.098 0.089 -0.066)
    Thelen2003Muscle QL_post_I_3_L2_l: max_isometric_force=56.48747 optimal_fiber_length=0.0565
        tendon_slack_length=0.0474 pennation_angle_at_optimal=0.1291544
      PathPoint L2_TP_l_P2: lumbar2 (-0.031 0.012 -0.0303)
      PathPoint I_3_l_P1: pelvis (-0.098 0.089 -0.066)
    Thelen2003Muscle QL_post_I_3_L3_l: max_isometric_force=96.36098 optimal_fiber_length=0.0399
        tendon_slack_length=0.0335 pennation_angle_at_optimal=0.1291544
      PathPoint L3_TP_l_P2: lumbar3 (-0.029 0.01963 -0.0303)
      PathPoint I_3_l_P1: pelvis (-0.098 0.089 -0.066)
    Thelen2003Muscle QL_mid_L3_12_3_r: max_isometric_force=41.93463 optimal_fiber_length=0.0616
        tendon_slack_length=0.032 pennation_angle_at_optimal=0.1291544
      PathPoint quadratus_lumb_mid_L3_1_r_P1: torso (-0.0419115 0.11237 0.05166)
      PathPoint quadratus_lumb_mid_L3_1_r_P2: lumbar3 (-0.0293616 0.0217307 0.03038)
    Thelen2003Muscle QL_mid_L3_12_2_r: max_isometric_force=47.71871 optimal_fiber_length=0.0665
        tendon_slack_length=0.0345 pennation_angle_at_optimal=0.1291544
      PathPoint quadratus_lumb_mid_L3_2_r_P2: torso (-0.0424782 0.119222 0.04319)
      PathPoint quadratus_lumb_mid_L3_2_r_P3: lumbar3 (-0.02936 0.02173 0.03038)
    Thelen2003Muscle QL_mid_L3_12_1_r: max_isometric_force=79.53119 optimal_fiber_length=0.0682
        tendon_slack_length=0.0354 pennation_angle_at_optimal=0.1291544
      PathPoint quadratus_lumb_mid_L3_3_r_P2: torso (-0.0412845 0.1282 0.03119)
      PathPoint quadratus_lumb_mid_L3_3_r_P3: lumbar3 (-0.02936 0.02173 0.03038)
    Thelen2003Muscle QL_mid_L2_12_1_r: max_isometric_force=156.0861 optimal_fiber_length=0.0464
        tendon_slack_length=0.0241 pennation_angle_at_optimal=0.1291544
      PathPoint QL_mid_L2-12_1_l_P1: torso (-0.04128 0.1282 0.03119)
      PathPoint QL_mid_L2-12_1_l_P2: lumbar2 (-0.0291214 0.0168959 0.02562)
    Thelen2003Muscle QL_mid_L4_12_3_r: max_isometric_force=42.09638 optimal_fiber_length=0.0771
        tendon_slack_length=0.04 pennation_angle_at_optimal=0.1291544
      PathPoint quadratus_lumb_mid_L4_1_r_P1: torso (-0.0417825 0.112316 0.05167)
      PathPoint quadratus_lumb_mid_L4_1_r_P2: lumbar4 (-0.0213825 0.0307 0.02806)
    Thelen2003Muscle QL_mid_L3_12_3_l: max_isometric_force=41.93463 optimal_fiber_length=0.0616
        tendon_slack_length=0.032 pennation_angle_at_optimal=0.1291544
      PathPoint quadratus_lumb_mid_L3_1_l_P1: torso (-0.0419115 0.11237 -0.05166)
      PathPoint quadratus_lumb_mid_L3_1_l_P2: lumbar3 (-0.0293616 0.0217307 -0.03038)
    Thelen2003Muscle QL_mid_L3_12_2_l: max_isometric_force=47.71871 optimal_fiber_length=0.0665
        tendon_slack_length=0.0345 pennation_angle_at_optimal=0.1291544
      PathPoint quadratus_lumb_mid_L3_2_l_P2: torso (-0.0424782 0.119222 -0.04319)
      PathPoint quadratus_lumb_mid_L3_2_l_P3: lumbar3 (-0.02936 0.02173 -0.03038)
    Thelen2003Muscle QL_mid_L3_12_1_l: max_isometric_force=79.53119 optimal_fiber_length=0.0682
        tendon_slack_length=0.0354 pennation_angle_at_optimal=0.1291544
      PathPoint quadratus_lumb_mid_L3_3_l_P2: torso (-0.0412845 0.1282 -0.03119)
      PathPoint quadratus_lumb_mid_L3_3_l_P3: lumbar3 (-0.02936 0.02173 -0.03038)
    Thelen2003Muscle QL_mid_L2_12_1_l: max_isometric_force=156.0861 optimal_fiber_length=0.0464
        tendon_slack_length=0.0241 pennation_angle_at_optimal=0.1291544
      PathPoint QL_mid_L2-12_1_l_P1: torso (-0.04128 0.1282 -0.03119)
      PathPoint QL_mid_L2-12_1_l_P2: lumbar2 (-0.0291214 0.0168959 -0.02562)
    Thelen2003Muscle QL_mid_L4_12_3_l: max_isometric_force=42.09638 optimal_fiber_length=0.0771
        tendon_slack_length=0.04 pennation_angle_at_optimal=0.1291544
      PathPoint quadratus_lumb_mid_L4_1_l_P1: torso (-0.0417825 0.112316 -0.05167)
      PathPoint quadratus_lumb_mid_L4_1_l_P2: lumbar4 (-0.0213825 0.0307 -0.02806)
    Thelen2003Muscle QL_ant_I_2_T12_r: max_isometric_force=45.39083 optimal_fiber_length=0.1152
        tendon_slack_length=0.0598 pennation_angle_at_optimal=0.1291544
      PathPoint I_2_r_P1: pelvis (-0.106 0.081 0.063)
      PathPoint T12_r_P2: torso (-0.0142008 0.13 0.02)
    Thelen2003Muscle QL_ant_I_3_T12_r: max_isometric_force=85.28362 optimal_fiber_length=0.1134
        tendon_slack_length=0.0589 pennation_angle_at_optimal=0.1291544
      PathPoint I_3_r_P1: pelvis (-0.098 0.089 0.066)
      PathPoint T12_r_P2: torso (-0.01 0.131 0.019)
    Thelen2003Muscle QL_ant_I_2_12_1_r: max_isometric_force=28.08042 optimal_fiber_length=0.1069
        tendon_slack_length=0.0555 pennation_angle_at_optimal=0.1291544
      PathPoint I_2_r_P2: pelvis (-0.106 0.081 0.063)
      PathPoint T12_1_r_P3: torso (-0.041 0.118 0.043)
    Thelen2003Muscle QL_ant_I_3_12_1_r: max_isometric_force=53.17357 optimal_fiber_length=0.1055
        tendon_slack_length=0.0548 pennation_angle_at_optimal=0.1291544
      PathPoint I_3_r_P1: pelvis (-0.098 0.089 0.066)
      PathPoint T12_1_r_P2: torso (-0.0402807 0.124401 0.03745)
    Thelen2003Muscle QL_ant_I_3_12_2_r: max_isometric_force=35.24989 optimal_fiber_length=0.1007
        tendon_slack_length=0.0523 pennation_angle_at_optimal=0.1291544
      PathPoint I_3_r_P1: pelvis (-0.098 0.089 0.066)
      PathPoint T12_2_r_P2: torso (-0.04024 0.11786 0.04608)
    Thelen2003Muscle QL_ant_I_3_12_3_r: max_isometric_force=40.627 optimal_fiber_length=0.0874
        tendon_slack_length=0.0454 pennation_angle_at_optimal=0.1291544
      PathPoint I_3_r_P2: pelvis (-0.098 0.089 0.066)
      PathPoint T12_3_r_P3: torso (-0.03801 0.111359 0.05452)
    Thelen2003Muscle QL_ant_I_2_T12_l: max_isometric_force=45.39083 optimal_fiber_length=0.1152
        tendon_slack_length=0.0598 pennation_angle_at_optimal=0.1291544
      PathPoint I_2_l_P1: pelvis (-0.106 0.081 -0.063)
      PathPoint T12_l_P2: torso (-0.01 0.131 -0.019)
    Thelen2003Muscle QL_ant_I_3_T12_l: max_isometric_force=85.28362 optimal_fiber_length=0.1134
        tendon_slack_length=0.0589 pennation_angle_at_optimal=0.1291544
      PathPoint I_3_l_P1: pelvis (-0.098 0.089 -0.066)
      PathPoint T12_l_P2: torso (-0.01 0.131 -0.019)
    Thelen2003Muscle QL_ant_I_2_12_1_l: max_isometric_force=28.08042 optimal_fiber_length=0.1069
        tendon_slack_length=0.0555 pennation_angle_at_optimal=0.1291544
      PathPoint I_2_l_P2: pelvis (-0.106 0.081 -0.063)
      PathPoint T12_1_l_P3: torso (-0.041 0.118 -0.043)
    Thelen2003Muscle QL_ant_I_3_12_1_l: max_isometric_force=53.17357 optimal_fiber_length=0.1055
        tendon_slack_length=0.0548 pennation_angle_at_optimal=0.1291544
      PathPoint I_3_l_P1: pelvis (-0.098 0.089 -0.066)
      PathPoint T12_1_l_P2: torso (-0.04 0.124 -0.037)
    Thelen2003Muscle QL_ant_I_3_12_2_l: max_isometric_force=35.24989 optimal_fiber_length=0.1007
        tendon_slack_length=0.0523 pennation_angle_at_optimal=0.1291544
      PathPoint I_3_l_P1: pelvis (-0.098 0.089 -0.066)
      PathPoint T12_2_l_P2: torso (-0.04024 0.11786 -0.04608)
    Thelen2003Muscle QL_ant_I_3_12_3_l: max_isometric_force=40.627 optimal_fiber_length=0.0874
        tendon_slack_length=0.0454 pennation_angle_at_optimal=0.1291544
      PathPoint I_3_l_P2: pelvis (-0.098 0.089 -0.066)
      PathPoint T12_3_l_P3: torso (-0.038 0.111 -0.055)
    Thelen2003Muscle MF_m1s_r: max_isometric_force=81.19739 optimal_fiber_length=0.0534 tendon_slack_length=0.0222
        pennation_angle_at_optimal=0
      PathPoint MF_m1s_r_P1: lumbar4 (-0.033 0.0323951 0.0174744)
      PathPoint MF_m1s_r_P2: lumbar1 (-0.037 -0.013 0.003)
    Thelen2003Muscle MF_m1t_1_r: max_isometric_force=71.96337 optimal_fiber_length=0.0877 tendon_slack_length=0.0263
        pennation_angle_at_optimal=0
      PathPoint MF_m1t_1_r_P1: lumbar5 (-0.02 0.039 0.0175946)
      PathPoint MF_m1t_1_r_P2: lumbar1 (-0.044 -0.0160046 0.00309636)
    Thelen2003Muscle MF_m1t_2_r: max_isometric_force=59.72683 optimal_fiber_length=0.108 tendon_slack_length=0.0324
        pennation_angle_at_optimal=0
      PathPoint MF_m1t_2_r_P1: sacrum (-0.121424 0.0839766 0.021)
      PathPoint MF_m1t_2_r_P2: lumbar1 (-0.044 -0.016 0.0031)
    Thelen2003Muscle MF_m1t_3_r: max_isometric_force=99.76112 optimal_fiber_length=0.118 tendon_slack_length=0.0354
        pennation_angle_at_optimal=0
      PathPoint MF_m1t_3_r_P1: pelvis (-0.132132 0.0543197 0.0480001)
      PathPoint MF_m1t_3_r_P2: lumbar1 (-0.044 -0.016 0.0031)
    Thelen2003Muscle MF_m2s_r: max_isometric_force=54.47881 optimal_fiber_length=0.055 tendon_slack_length=0.0213
        pennation_angle_at_optimal=0
      PathPoint MF_m2s_r_P1: lumbar5 (-0.02 0.04 0.0158123)
      PathPoint MF_m2s_r_P2: lumbar2 (-0.041 -0.0117591 0.004)
    Thelen2003Muscle MF_m2t_1_r: max_isometric_force=57.47237 optimal_fiber_length=0.0746 tendon_slack_length=0.0227
        pennation_angle_at_optimal=0
      PathPoint MF_m2t_1_r_P1: sacrum (-0.120758 0.0852181 0.0204354)
      PathPoint MF_m2t_1_r_P2: lumbar2 (-0.045 -0.01839 0.004)
    Thelen2003Muscle MF_m2t_2_r: max_isometric_force=145.8914 optimal_fiber_length=0.0934 tendon_slack_length=0.0284
        pennation_angle_at_optimal=0
      PathPoint MF_m2t_2_r_P1: pelvis (-0.134 0.049 0.047)
      PathPoint MF_m2t_2_r_P2: lumbar2 (-0.045 -0.01839 0.00364)
    Thelen2003Muscle MF_m2t_3_r: max_isometric_force=161.1852 optimal_fiber_length=0.1044 tendon_slack_length=0.0318
        pennation_angle_at_optimal=0
      PathPoint MF_m2t_3_r_P1: pelvis (-0.137 0.036 0.045)
      PathPoint MF_m2t_3_r_P2: lumbar2 (-0.044 -0.0187383 0.00236534)
    Thelen2003Muscle MF_m3s_r: max_isometric_force=83.72206 optimal_fiber_length=0.0471 tendon_slack_length=0.0196
        pennation_angle_at_optimal=0
      PathPoint MF_m3s_r_P1: sacrum (-0.122 0.084 0.019)
      PathPoint MF_m3s_r_P2: lumbar3 (-0.042 -0.00645328 0.00290733)
    Thelen2003Muscle MF_m3t_1_r: max_isometric_force=90.97846 optimal_fiber_length=0.1128 tendon_slack_length=0.0375
        pennation_angle_at_optimal=0
      PathPoint MF_m3t_1_r_P1: pelvis (-0.153895 0.0020886 0.0163612)
      PathPoint MF_m3t_1_r_P2: lumbar3 (-0.048 -0.0102252 0.00166214)
    Thelen2003Muscle MF_m3t_2_r: max_isometric_force=90.97846 optimal_fiber_length=0.0949 tendon_slack_length=0.0316
        pennation_angle_at_optimal=0
      PathPoint MF_m3t_2_r_P1: pelvis (-0.147053 0.0213268 0.0221121)
      PathPoint MF_m3t_2_r_P2: lumbar3 (-0.048 -0.01023 0.00266)
    Thelen2003Muscle MF_m3t_3_r: max_isometric_force=90.97846 optimal_fiber_length=0.0949 tendon_slack_length=0.0316
        pennation_angle_at_optimal=0
      PathPoint MF_m3t_3_r_P1: pelvis (-0.147 0.021 0.022)
      PathPoint MF_m3t_3_r_P2: lumbar3 (-0.048 -0.01023 0.00266)
    Thelen2003Muscle MF_m4s_r: max_isometric_force=101.066 optimal_fiber_length=0.0429 tendon_slack_length=0.0271
        pennation_angle_at_optimal=0
      PathPoint MF_m4s_r_P1: sacrum (-0.143689 0.0547099 0.018)
      PathPoint MF_m4s_r_P2: lumbar4 (-0.036 -0.00021522 0.00224284)
    Thelen2003Muscle MF_m4t_1_r: max_isometric_force=90.11722 optimal_fiber_length=0.0615 tendon_slack_length=0.0249
        pennation_angle_at_optimal=0
      PathPoint MF_m4t_1_r_P1: sacrum (-0.152233 0.0415265 0.0153587)
      PathPoint MF_m4t_1_r_P2: lumbar4 (-0.043 0.00016821 0.00288018)
    Thelen2003Muscle MF_m4t_2_r: max_isometric_force=90.11722 optimal_fiber_length=0.0802 tendon_slack_length=0.0325
        pennation_angle_at_optimal=0
      PathPoint MF_m4t_2_r_P1: pelvis (-0.151 0.008 0.016)
      PathPoint MF_m4t_2_r_P2: lumbar4 (-0.044 0.00017 0.00288)
    Thelen2003Muscle MF_m4t_3_r: max_isometric_force=90.11722 optimal_fiber_length=0.0917 tendon_slack_length=0.0371
        pennation_angle_at_optimal=0
      PathPoint MF_m4t_3_r_P1: pelvis (-0.16 -0.004 0.014)
      PathPoint MF_m4t_3_r_P2: lumbar4 (-0.045 0.00017 0.00288)
    Thelen2003Muscle MF_m5s_r: max_isometric_force=34.87635 optimal_fiber_length=0.0147 tendon_slack_length=0.0093
        pennation_angle_at_optimal=0
      PathPoint MF_m5s_r_P1: sacrum (-0.130455 0.0662703 0.012)
      PathPoint MF_m5s_r_P2: lumbar5 (-0.031 0.017 0.00392934)
    Thelen2003Muscle MF_m5t_1_r: max_isometric_force=34.87635 optimal_fiber_length=0.076 tendon_slack_length=0.0307
        pennation_angle_at_optimal=0
      PathPoint MF_m5t_1_r_P1: sacrum (-0.174067 0.00522922 0.0100331)
      PathPoint MF_m5t_1_r_P2: lumbar5 (-0.03551 0.016863 0.00292592)
    Thelen2003Muscle MF_m5t_2_r: max_isometric_force=34.87635 optimal_fiber_length=0.0568 tendon_slack_length=0.023
        pennation_angle_at_optimal=0
      PathPoint MF_m5t_2_r_P1: sacrum (-0.163116 0.0256618 0.011708)
      PathPoint MF_m5t_2_r_P2: lumbar5 (-0.0345516 0.0159287 0.00277147)
    Thelen2003Muscle MF_m5t_3_r: max_isometric_force=34.87635 optimal_fiber_length=0.0407 tendon_slack_length=0.0165
        pennation_angle_at_optimal=0
      PathPoint MF_m5t_3_r_P1: sacrum (-0.152276 0.0425844 0.0115967)
      PathPoint MF_m5t_3_r_P2: lumbar5 (-0.0328228 0.015247 0.00232083)
    Thelen2003Muscle MF_m1_laminar_r: max_isometric_force=39.05418 optimal_fiber_length=0.0369
        tendon_slack_length=0.014 pennation_angle_at_optimal=0
      PathPoint MF_m1_laminar_r_P1: lumbar3 (-0.04 0.025 0.018)
      PathPoint MF_m1_laminar_r_P2: lumbar1 (-0.035 -0.00560525 0.008)
    Thelen2003Muscle MF_m2_laminar_r: max_isometric_force=30.97457 optimal_fiber_length=0.0311
        tendon_slack_length=0.0118 pennation_angle_at_optimal=0
      PathPoint MF_m2_laminar_r_P1: lumbar4 (-0.033 0.034 0.01694)
      PathPoint MF_m2_laminar_r_P2: lumbar2 (-0.036 -0.006 0.007)
    Thelen2003Muscle MF_m3_laminar_r: max_isometric_force=35.77736 optimal_fiber_length=0.0331
        tendon_slack_length=0.0126 pennation_angle_at_optimal=0
      PathPoint MF_m3_laminar_r_P1: lumbar5 (-0.022 0.039 0.016)
      PathPoint MF_m3_laminar_r_P2: lumbar3 (-0.038 0.00069045 0.00635)
    Thelen2003Muscle MF_m4_laminar_r: max_isometric_force=25.94666 optimal_fiber_length=0.0349
        tendon_slack_length=0.0133 pennation_angle_at_optimal=0
      PathPoint MF_m4_laminar_r_P1: sacrum (-0.128 0.0774879 0.018)
      PathPoint MF_m4_laminar_r_P2: lumbar4 (-0.034 0.00581344 0.00694)
    Thelen2003Muscle MF_m5_laminar_r: max_isometric_force=55.93696 optimal_fiber_length=0.0256
        tendon_slack_length=0.0097 pennation_angle_at_optimal=0
      PathPoint MF_m5_laminar_r_P1: pelvis (-0.138 0.045 0.012)
      PathPoint MF_m5_laminar_r_P2: lumbar5 (-0.029 0.018 0.00564)
    Thelen2003Muscle MF_m1s_l: max_isometric_force=81.19739 optimal_fiber_length=0.0534 tendon_slack_length=0.0222
        pennation_angle_at_optimal=0
      PathPoint MF_m1s_l_P1: lumbar4 (-0.033 0.032 -0.017)
      PathPoint MF_m1s_l_P2: lumbar1 (-0.037 -0.013 -0.003)
    Thelen2003Muscle MF_m1t_1_l: max_isometric_force=71.96337 optimal_fiber_length=0.0877 tendon_slack_length=0.0263
        pennation_angle_at_optimal=0
      PathPoint MF_m1t_1_l_P1: lumbar5 (-0.0186347 0.0369697 -0.01759)
      PathPoint MF_m1t_1_l_P2: lumbar1 (-0.044 -0.0160046 -0.0031)
    Thelen2003Muscle MF_m1t_2_l: max_isometric_force=59.72683 optimal_fiber_length=0.108 tendon_slack_length=0.0324
        pennation_angle_at_optimal=0
      PathPoint MF_m1t_2_l_P1: sacrum (-0.121424 0.0839766 -0.021)
      PathPoint MF_m1t_2_l_P2: lumbar1 (-0.044 -0.016 -0.0031)
    Thelen2003Muscle MF_m1t_3_l: max_isometric_force=99.76112 optimal_fiber_length=0.118 tendon_slack_length=0.0354
        pennation_angle_at_optimal=0
      PathPoint MF_m1t_3_l_P1: pelvis (-0.132 0.054 -0.048)
      PathPoint MF_m1t_3_l_P2: lumbar1 (-0.044 -0.016 -0.0031)
    Thelen2003Muscle MF_m2s_l: max_isometric_force=54.47881 optimal_fiber_length=0.055 tendon_slack_length=0.0213
        pennation_angle_at_optimal=0
      PathPoint MF_m2s_l_P1: lumbar5 (-0.02 0.04 -0.01581)
      PathPoint MF_m2s_l_P2: lumbar2 (-0.041 -0.012 -0.004)
    Thelen2003Muscle MF_m2t_1_l: max_isometric_force=57.47237 optimal_fiber_length=0.0746 tendon_slack_length=0.0227
        pennation_angle_at_optimal=0
      PathPoint MF_m2t_1_l_P1: sacrum (-0.120758 0.0852181 -0.022)
      PathPoint MF_m2t_1_l_P2: lumbar2 (-0.045 -0.01839 -0.00364)
    Thelen2003Muscle MF_m2t_2_l: max_isometric_force=145.8914 optimal_fiber_length=0.0934 tendon_slack_length=0.0284
        pennation_angle_at_optimal=0
      PathPoint MF_m2t_2_l_P1: pelvis (-0.134 0.049 -0.047)
      PathPoint MF_m2t_2_l_P2: lumbar2 (-0.045 -0.01839 -0.00364)
    Thelen2003Muscle MF_m2t_3_l: max_isometric_force=161.1852 optimal_fiber_length=0.1044 tendon_slack_length=0.0318
        pennation_angle_at_optimal=0
      PathPoint MF_m2t_3_l_P1: pelvis (-0.137 0.036 -0.045)
      PathPoint MF_m2t_3_l_P2: lumbar2 (-0.044 -0.0187383 -0.00364)
    Thelen2003Muscle MF_m3s_l: max_isometric_force=83.72206 optimal_fiber_length=0.0471 tendon_slack_length=0.0196
        pennation_angle_at_optimal=0
      PathPoint MF_m3s_l_P1: sacrum (-0.121511 0.0836358 -0.019)
      PathPoint MF_m3s_l_P2: lumbar3 (-0.036 -0.006 -0.003)
    Thelen2003Muscle MF_m3t_1_l: max_isometric_force=90.97846 optimal_fiber_length=0.1128 tendon_slack_length=0.0375
        pennation_angle_at_optimal=0
      PathPoint MF_m3t_1_l_P1: pelvis (-0.154 0.002 -0.016)
      PathPoint MF_m3t_1_l_P2: lumbar3 (-0.048 -0.0102252 -0.00291)
    Thelen2003Muscle MF_m3t_2_l: max_isometric_force=90.97846 optimal_fiber_length=0.0949 tendon_slack_length=0.0316
        pennation_angle_at_optimal=0
      PathPoint MF_m3t_2_l_P1: pelvis (-0.147 0.021 -0.02185)
      PathPoint MF_m3t_2_l_P2: lumbar3 (-0.048 -0.01023 -0.00266)
    Thelen2003Muscle MF_m3t_3_l: max_isometric_force=90.97846 optimal_fiber_length=0.0949 tendon_slack_length=0.0316
        pennation_angle_at_optimal=0
      PathPoint MF_m3t_3_l_P1: pelvis (-0.147 0.021 -0.02185)
      PathPoint MF_m3t_3_l_P2: lumbar3 (-0.048 -0.01023 -0.00266)
    Thelen2003Muscle MF_m4s_l: max_isometric_force=101.066 optimal_fiber_length=0.0429 tendon_slack_length=0.0271
        pennation_angle_at_optimal=0
      PathPoint MF_m4s_l_P1: sacrum (-0.143689 0.0547099 -0.018)
      PathPoint MF_m4s_l_P2: lumbar4 (-0.036 -0.00021522 -0.002)
    Thelen2003Muscle MF_m4t_1_l: max_isometric_force=90.11722 optimal_fiber_length=0.0615 tendon_slack_length=0.0249
        pennation_angle_at_optimal=0
      PathPoint MF_m4t_1_l_P1: sacrum (-0.152 0.042 -0.015)
      PathPoint MF_m4t_1_l_P2: lumbar4 (-0.043 0 -0.003)
    Thelen2003Muscle MF_m4t_2_l: max_isometric_force=90.11722 optimal_fiber_length=0.0802 tendon_slack_length=0.0325
        pennation_angle_at_optimal=0
      PathPoint MF_m4t_2_l_P1: pelvis (-0.151 0.008 -0.016)
      PathPoint MF_m4t_2_l_P2: lumbar4 (-0.044 0.00017 -0.00288)
    Thelen2003Muscle MF_m4t_3_l: max_isometric_force=90.11722 optimal_fiber_length=0.0917 tendon_slack_length=0.0371
        pennation_angle_at_optimal=0
      PathPoint MF_m4t_3_l_P1: pelvis (-0.16 -0.004 -0.014)
      PathPoint MF_m4t_3_l_P2: lumbar4 (-0.0441 0.00017 -0.003)
    Thelen2003Muscle MF_m5s_l: max_isometric_force=34.87635 optimal_fiber_length=0.0147 tendon_slack_length=0.0093
        pennation_angle_at_optimal=0
      PathPoint MF_m5s_l_P1: sacrum (-0.130455 0.0662703 -0.012)
      PathPoint MF_m5s_l_P2: lumbar5 (-0.031 0.017 -0.004)
    Thelen2003Muscle MF_m5t_1_l: max_isometric_force=34.87635 optimal_fiber_length=0.076 tendon_slack_length=0.0307
        pennation_angle_at_optimal=0
      PathPoint MF_m5t_1_l_P1: sacrum (-0.174067 0.00522922 -0.01003)
      PathPoint MF_m5t_1_l_P2: lumbar5 (-0.03551 0.016863 -0.00293)
    Thelen2003Muscle MF_m5t_2_l: max_isometric_force=34.87635 optimal_fiber_length=0.0568 tendon_slack_length=0.023
        pennation_angle_at_optimal=0
      PathPoint MF_m5t_2_l_P1: sacrum (-0.163116 0.0256618 -0.01171)
      PathPoint MF_m5t_2_l_P2: lumbar5 (-0.0345516 0.0159287 -0.00293)
    Thelen2003Muscle MF_m5t_3_l: max_isometric_force=34.87635 optimal_fiber_length=0.0407 tendon_slack_length=0.0165
        pennation_angle_at_optimal=0
      PathPoint MF_m5t_3_l_P1: sacrum (-0.152276 0.0425844 -0.0116)
      PathPoint MF_m5t_3_l_P2: lumbar5 (-0.0328228 0.015247 -0.00277)
    Thelen2003Muscle MF_m1_laminar_l: max_isometric_force=39.05418 optimal_fiber_length=0.0369
        tendon_slack_length=0.014 pennation_angle_at_optimal=0
      PathPoint MF_m1_laminar_l_P1: lumbar3 (-0.04 0.02527 -0.018)
      PathPoint MF_m1_laminar_l_P2: lumbar1 (-0.035 -0.00560525 -0.008)
    Thelen2003Muscle MF_m2_laminar_l: max_isometric_force=30.97457 optimal_fiber_length=0.0311
        tendon_slack_length=0.0118 pennation_angle_at_optimal=0
      PathPoint MF_m2_laminar_l_P1: lumbar4 (-0.033 0.0335037 -0.01694)
      PathPoint MF_m2_laminar_l_P2: lumbar2 (-0.036 -0.006 -0.007)
    Thelen2003Muscle MF_m3_laminar_l: max_isometric_force=35.77736 optimal_fiber_length=0.0331
        tendon_slack_length=0.0126 pennation_angle_at_optimal=0
      PathPoint MF_m3_laminar_l_P1: lumbar5 (-0.022 0.039 -0.01617)
      PathPoint MF_m3_laminar_l_P2: lumbar3 (-0.038 0.001 -0.006)
    Thelen2003Muscle MF_m4_laminar_l: max_isometric_force=25.94666 optimal_fiber_length=0.0349
        tendon_slack_length=0.0133 pennation_angle_at_optimal=0
      PathPoint MF_m4_laminar_l_P1: sacrum (-0.128 0.0774879 -0.018)
      PathPoint MF_m4_laminar_l_P2: lumbar4 (-0.034 0.00581344 -0.00694)
    Thelen2003Muscle MF_m5_laminar_l: max_isometric_force=55.93696 optimal_fiber_length=0.0256
        tendon_slack_length=0.0097 pennation_angle_at_optimal=0
      PathPoint MF_m5_laminar_l_P1: pelvis (-0.138 0.045 -0.01238)
      PathPoint MF_m5_laminar_l_P2: lumbar5 (-0.029 0.018 -0.00564)
    Thelen2003Muscle IL_L1_r: max_isometric_force=147.4443 optimal_fiber_length=0.057 tendon_slack_length=0.1292
        pennation_angle_at_optimal=0.2408554
      PathPoint IL_L1_r_P1: pelvis (-0.143993 0.0390001 0.0503121)
      PathPoint IL_L1_r_P2: lumbar1 (-0.031 0.017 0.029)
    Thelen2003Muscle IL_L2_r: max_isometric_force=183.2164 optimal_fiber_length=0.0405 tendon_slack_length=0.0919
        pennation_angle_at_optimal=0.2408554
      PathPoint IL_L2_r_P1: pelvis (-0.136 0.056 0.055)
      PathPoint IL_L2_r_P2: lumbar2 (-0.03245 0.012913 0.031)
      PathWrap: wrap_object=Cylinder method=hybrid
    Thelen2003Muscle IL_L3_r: max_isometric_force=216.7631 optimal_fiber_length=0.0269 tendon_slack_length=0.0611
        pennation_angle_at_optimal=0.2408554
      PathPoint IL_L3_r_P1: pelvis (-0.122 0.068 0.06)
      PathPoint IL_L3_r_P2: lumbar3 (-0.0316877 0.0219341 0.0311389)
      PathWrap: wrap_object=Cylinder method=hybrid
    Thelen2003Muscle IL_L4_r: max_isometric_force=414.9096 optimal_fiber_length=0.0187 tendon_slack_length=0.0424
        pennation_angle_at_optimal=0.2408554
      PathPoint IL_L4_r_P1: pelvis (-0.117 0.065 0.056)
      PathPoint IL_L4_r_P2: lumbar4 (-0.0237666 0.0275638 0.031)
      PathWrap: wrap_object=Cylinder method=hybrid
    Thelen2003Muscle IL_L1_l: max_isometric_force=147.4443 optimal_fiber_length=0.057 tendon_slack_length=0.1292
        pennation_angle_at_optimal=0.2408554
      PathPoint IL_L1_l_P1: pelvis (-0.144 0.039 -0.05)
      PathPoint IL_L1_l_P2: lumbar1 (-0.031 0.017 -0.029)
    Thelen2003Muscle IL_L2_l: max_isometric_force=183.2164 optimal_fiber_length=0.0405 tendon_slack_length=0.0919
        pennation_angle_at_optimal=0.2408554
      PathPoint IL_L2_l_P1: pelvis (-0.136 0.056 -0.055)
      PathPoint IL_L2_l_P2: lumbar2 (-0.032 0.013 -0.031)
      PathWrap: wrap_object=Cylinder method=hybrid
    Thelen2003Muscle IL_L3_l: max_isometric_force=216.7631 optimal_fiber_length=0.0269 tendon_slack_length=0.0611
        pennation_angle_at_optimal=0.2408554
      PathPoint IL_L3_l_P1: pelvis (-0.122 0.068 -0.06)
      PathPoint IL_L3_l_P2: lumbar3 (-0.032 0.022 -0.0305391)
      PathWrap: wrap_object=Cylinder method=hybrid
    Thelen2003Muscle IL_L4_l: max_isometric_force=414.9096 optimal_fiber_length=0.0187 tendon_slack_length=0.0424
        pennation_angle_at_optimal=0.2408554
      PathPoint IL_L4_l_P1: pelvis (-0.117 0.065 -0.056)
      PathPoint IL_L4_l_P2: lumbar4 (-0.024 0.028 -0.031)
      PathWrap: wrap_object=Cylinder method=hybrid
    Thelen2003Muscle IL_R5_r: max_isometric_force=57.32231 optimal_fiber_length=0.1842 tendon_slack_length=0.2579
        pennation_angle_at_optimal=0.2408554
      PathPoint IL_r5_R_P1: pelvis (-0.136 0.044 0.049)
      PathPoint IL_r5_R_P2: lumbar2 (-0.0496298 0.002 0.056)
      PathPoint IL_r5_R_P3: torso (-0.079 0.172 0.057)
      PathPoint IL_r5_R_P4: torso (-0.08 0.2 0.057)
      PathPoint IL_r5_R_P5: torso (-0.081 0.237 0.058)
      PathPoint IL_r5_R_P6: torso (-0.079 0.265 0.059)
      PathPoint IL_r5_R_P7: torso (-0.076 0.287 0.059)
      PathPoint IL_r5_R_P8: torso (-0.07 0.308 0.06)
    Thelen2003Muscle IL_R6_r: max_isometric_force=72.69179 optimal_fiber_length=0.1789 tendon_slack_length=0.2161
        pennation_angle_at_optimal=0.2408554
      PathPoint IL_r6_R_P1: pelvis (-0.129 0.059 0.053)
      PathPoint IL_r6_R_P2: lumbar2 (-0.0492143 0.00236612 0.058)
      PathPoint IL_r6_R_P3: torso (-0.079 0.171 0.06)
      PathPoint IL_r6_R_P4: torso (-0.08 0.202 0.06)
      PathPoint IL_r6_R_P5: torso (-0.081 0.24 0.061)
      PathPoint IL_r6_R_P6: torso (-0.077 0.268 0.062)
      PathPoint IL_r6_R_P7: torso (-0.071 0.282 0.063)
    Thelen2003Muscle IL_R7_r: max_isometric_force=87.65739 optimal_fiber_length=0.1755 tendon_slack_length=0.1844
        pennation_angle_at_optimal=0.2408554
      PathPoint IL_r7_R_P1: pelvis (-0.119 0.069 0.058)
      PathPoint IL_r7_R_P2: lumbar2 (-0.0486649 0.00237387 0.061)
      PathPoint IL_r7_R_P3: torso (-0.08 0.172 0.063)
      PathPoint IL_r7_R_P4: torso (-0.08 0.201 0.063)
      PathPoint IL_r7_R_P5: torso (-0.081 0.239 0.064)
      PathPoint IL_r7_R_P6: torso (-0.075 0.261 0.065)
    Thelen2003Muscle IL_R8_r: max_isometric_force=77.91768 optimal_fiber_length=0.1613 tendon_slack_length=0.1629
        pennation_angle_at_optimal=0.2408554
      PathPoint IL_r8_R_P1: pelvis (-0.121 0.071 0.06)
      PathPoint IL_r8_R_P2: lumbar2 (-0.048 0.003 0.064)
      PathPoint IL_r8_R_P3: torso (-0.079 0.167 0.065)
      PathPoint IL_r8_R_P4: torso (-0.0811061 0.201 0.065)
      PathPoint IL_r8_R_P5: torso (-0.079 0.229 0.066)
    Thelen2003Muscle IL_R9_r: max_isometric_force=95.91499 optimal_fiber_length=0.1861 tendon_slack_length=0.1095
        pennation_angle_at_optimal=0.2408554
      PathPoint IL_r9_R_P1: pelvis (-0.119 0.075 0.06)
      PathPoint IL_r9_R_P2: lumbar2 (-0.048 0.003 0.066)
      PathPoint IL_r9_R_P3: torso (-0.08 0.169 0.068)
      PathPoint IL_r9_R_P4: torso (-0.076 0.193 0.068)
    Thelen2003Muscle IL_R10_r: max_isometric_force=191.842 optimal_fiber_length=0.1626 tendon_slack_length=0.0957
        pennation_angle_at_optimal=0.2408554
      PathPoint IL_r10_R_P1: pelvis (-0.117 0.072 0.062)
      PathPoint IL_r10_R_P2: lumbar2 (-0.0480883 0.00262684 0.069)
      PathPoint IL_r10_R_P3: torso (-0.075 0.155 0.07)
    Thelen2003Muscle IL_R11_r: max_isometric_force=235.1806 optimal_fiber_length=0.1362 tendon_slack_length=0.0682
        pennation_angle_at_optimal=0.2408554
      PathPoint IL_r11_R_P1: pelvis (-0.113 0.079 0.064)
      PathPoint IL_r11_R_P2: lumbar2 (-0.0479471 0.00270337 0.072)
      PathPoint IL_r11_R_P3: torso (-0.062 0.125 0.074)
    Thelen2003Muscle IL_R12_r: max_isometric_force=206.1732 optimal_fiber_length=0.1007 tendon_slack_length=0.0504
        pennation_angle_at_optimal=0.2408554
      PathPoint IL_r12_R_P1: pelvis (-0.111 0.082 0.067)
      PathPoint IL_r12_R_P2: torso (-0.032 0.095 0.067)
    Thelen2003Muscle IL_R5_l: max_isometric_force=57.32231 optimal_fiber_length=0.1842 tendon_slack_length=0.2579
        pennation_angle_at_optimal=0.2408554
      PathPoint IL_r5_L_P1: pelvis (-0.135908 0.0438379 -0.0489845)
      PathPoint IL_r5_L_P2: lumbar2 (-0.0496298 0.00211134 -0.056)
      PathPoint IL_r5_L_P3: torso (-0.078 0.172 -0.057)
      PathPoint IL_r5_L_P4: torso (-0.08 0.2 -0.057)
      PathPoint IL_r5_L_P5: torso (-0.081 0.237 -0.058)
      PathPoint IL_r5_L_P6: torso (-0.079 0.265 -0.059)
      PathPoint IL_r5_L_P7: torso (-0.076 0.287 -0.059)
      PathPoint IL_r5_L_P8: torso (-0.07 0.308 -0.06)
    Thelen2003Muscle IL_R6_l: max_isometric_force=72.6918 optimal_fiber_length=0.1789 tendon_slack_length=0.2161
        pennation_angle_at_optimal=0.2408554
      PathPoint IL_r6_L_P1: pelvis (-0.128722 0.0586615 -0.0529753)
      PathPoint IL_r6_L_P2: lumbar2 (-0.0492143 0.002 -0.058)
      PathPoint IL_r6_L_P3: torso (-0.079 0.1719 -0.06)
      PathPoint IL_r6_L_P4: torso (-0.079 0.202 -0.06)
      PathPoint IL_r6_L_P5: torso (-0.08 0.24 -0.061)
      PathPoint IL_r6_L_P6: torso (-0.077 0.268 -0.062)
      PathPoint IL_r6_L_P7: torso (-0.071 0.282 -0.063)
    Thelen2003Muscle IL_R7_l: max_isometric_force=87.65739 optimal_fiber_length=0.1755 tendon_slack_length=0.1844
        pennation_angle_at_optimal=0.2408554
      PathPoint IL_r7_L_P1: pelvis (-0.11891 0.0692658 -0.0580751)
      PathPoint IL_r7_L_P2: lumbar2 (-0.0486649 0.00237387 -0.061)
      PathPoint IL_r7_L_P3: torso (-0.08 0.172 -0.063)
      PathPoint IL_r7_L_P4: torso (-0.08 0.201 -0.063)
      PathPoint IL_r7_L_P5: torso (-0.081 0.239 -0.064)
      PathPoint IL_r7_L_P6: torso (-0.075 0.261 -0.065)
    Thelen2003Muscle IL_R8_l: max_isometric_force=77.91768 optimal_fiber_length=0.1613 tendon_slack_length=0.1629
        pennation_angle_at_optimal=0.2408554
      PathPoint IL_r8_L_P1: pelvis (-0.121 0.071 -0.06)
      PathPoint IL_r8_L_P2: lumbar2 (-0.048 0.00285524 -0.064)
      PathPoint IL_r8_L_P3: torso (-0.079 0.167 -0.065)
      PathPoint IL_r8_L_P4: torso (-0.081 0.201 -0.065)
      PathPoint IL_r8_L_P5: torso (-0.079 0.229 -0.066)
    Thelen2003Muscle IL_R9_l: max_isometric_force=95.915 optimal_fiber_length=0.1861 tendon_slack_length=0.1095
        pennation_angle_at_optimal=0.2408554
      PathPoint IL_r9_L_P1: pelvis (-0.119 0.075 -0.06)
      PathPoint IL_r9_L_P2: lumbar2 (-0.0483524 0.00265461 -0.066)
      PathPoint IL_r9_L_P3: torso (-0.078 0.164 -0.068)
      PathPoint IL_r9_L_P4: torso (-0.076 0.193 -0.068)
    Thelen2003Muscle IL_R10_l: max_isometric_force=191.842 optimal_fiber_length=0.1626 tendon_slack_length=0.0957
        pennation_angle_at_optimal=0.2408554
      PathPoint IL_r10_L_P1: pelvis (-0.116 0.076 -0.062)
      PathPoint IL_r10_L_P2: lumbar2 (-0.0480883 0.00262684 -0.069)
      PathPoint IL_r10_L_P3: torso (-0.0749575 0.155 -0.07)
    Thelen2003Muscle IL_R11_l: max_isometric_force=235.1806 optimal_fiber_length=0.1362 tendon_slack_length=0.0682
        pennation_angle_at_optimal=0.2408554
      PathPoint IL_r11_L_P1: pelvis (-0.113 0.079 -0.064)
      PathPoint IL_r11_L_P2: lumbar2 (-0.0479471 0.00270337 -0.072)
      PathPoint IL_r11_L_P3: torso (-0.0624397 0.125 -0.074)
    Thelen2003Muscle IL_R12_l: max_isometric_force=206.1732 optimal_fiber_length=0.1007 tendon_slack_length=0.0504
        pennation_angle_at_optimal=0.2408554
      PathPoint IL_r12_L_P1: pelvis (-0.111 0.0819447 -0.0665628)
      PathPoint IL_r12_L_P2: torso (-0.0320122 0.0953599 -0.067)
    Thelen2003Muscle LTpT_T1_r: max_isometric_force=325.8947 optimal_fiber_length=0.1102 tendon_slack_length=0.261
        pennation_angle_at_optimal=0.2199115
      PathPoint LTpT_t1_R_P1: lumbar1 (-0.048 -0.013 0.00321)
      PathPoint LTpT_t1_R_P2: torso (-0.05 0.405 0.02615)
      PathWrap: wrap_object=Chest_r method=hybrid
    Thelen2003Muscle LTpT_T2_r: max_isometric_force=240.6609 optimal_fiber_length=0.1154 tendon_slack_length=0.2774
        pennation_angle_at_optimal=0.2199115
      PathPoint LTpT_t2_R_P1: lumbar2 (-0.047 -0.015 0.00383)
      PathPoint LTpT_t2_R_P2: torso (-0.055 0.386 0.02654)
      PathWrap: wrap_object=Chest_r method=hybrid
    Thelen2003Muscle LTpT_T3_r: max_isometric_force=172.5042 optimal_fiber_length=0.117 tendon_slack_length=0.2814
        pennation_angle_at_optimal=0.2199115
      PathPoint LTpT_t3_R_P1: lumbar3 (-0.05 -0.004 0.004)
      PathPoint LTpT_t3_R_P2: lumbar1 (-0.03711 -0.01402 0.005)
      PathPoint LTpT_t3_R_P3: torso (-0.0614225 0.365086 0.0255244)
      PathWrap: wrap_object=Chest_r method=hybrid
    Thelen2003Muscle LTpT_T4_r: max_isometric_force=60.57609 optimal_fiber_length=0.1172 tendon_slack_length=0.2819
        pennation_angle_at_optimal=0.2199115
      PathPoint LTpT_t4_R_P1: lumbar4 (-0.049 0.007 0.00282)
      PathPoint LTpT_t4_R_P2: lumbar1 (-0.0371129 -0.014 0.00612)
      PathPoint LTpT_t4_R_P3: torso (-0.07 0.343 0.02615)
      PathWrap: wrap_object=Chest_r method=hybrid
    Thelen2003Muscle LTpT_T5_r: max_isometric_force=57.01232 optimal_fiber_length=0.1096 tendon_slack_length=0.2635
        pennation_angle_at_optimal=0.2199115
      PathPoint LTpT_t5_R_P1: lumbar4 (-0.049 0.004 -0.000432746)
      PathPoint LTpT_t5_R_P2: lumbar2 (-0.044 0.0044 0.0064)
      PathPoint LTpT_t5_R_P3: torso (-0.0739587 0.32 0.028)
      PathWrap: wrap_object=Chest_r method=hybrid
    Thelen2003Muscle LTpT_T6_r: max_isometric_force=81.40657 optimal_fiber_length=0.1146 tendon_slack_length=0.2619
        pennation_angle_at_optimal=0.2199115
      PathPoint LTpT_t6_R_P1: lumbar5 (-0.038 0.018 0.00021356)
      PathPoint LTpT_t6_R_P2: lumbar2 (-0.044 0.0044 0.009)
      PathPoint LTpT_t6_R_P3: torso (-0.0729686 0.190038 0.0152527)
      PathPoint LTpT_t6_R_P4: torso (-0.08 0.294 0.02766)
    Thelen2003Muscle LTpT_T7_r: max_isometric_force=79.70635 optimal_fiber_length=0.1304 tendon_slack_length=0.2467
        pennation_angle_at_optimal=0.2199115
      PathPoint LTpT_t7_R_P1: sacrum (-0.131317 0.0605127 0.00027686)
      PathPoint LTpT_t7_R_P2: lumbar2 (-0.04399 0.0044 0.011)
      PathPoint LTpT_t7_R_P3: torso (-0.0726628 0.190681 0.019448)
      PathPoint LTpT_t7_R_P4: torso (-0.08 0.267 0.02647)
    Thelen2003Muscle LTpT_T8_r: max_isometric_force=79.70635 optimal_fiber_length=0.1391 tendon_slack_length=0.2197
        pennation_angle_at_optimal=0.2199115
      PathPoint LTpT_t8_R_P1: sacrum (-0.142901 0.0502456 0.00037451)
      PathPoint LTpT_t8_R_P2: lumbar4 (-0.0469739 0.0180443 0.00565735)
      PathPoint LTpT_t8_R_P3: lumbar3 (-0.0467498 0.0135459 0.00831636)
      PathPoint LTpT_t8_R_P4: lumbar2 (-0.0453159 0.00310151 0.01094)
      PathPoint LTpT_t8_R_P5: torso (-0.079 0.241 0.0255)
    Thelen2003Muscle LTpT_T9_r: max_isometric_force=139.4342 optimal_fiber_length=0.1368 tendon_slack_length=0.2318
        pennation_angle_at_optimal=0.2199115
      PathPoint LTpT_t9_R_P1: sacrum (-0.165822 0.0268352 0)
      PathPoint LTpT_t9_R_P2: lumbar4 (-0.04672 0.01796 0.00748)
      PathPoint LTpT_t9_R_P3: lumbar3 (-0.0464295 0.0138534 0.00968998)
      PathPoint LTpT_t9_R_P4: lumbar2 (-0.0447163 0.00347304 0.0115)
      PathPoint LTpT_t9_R_P5: torso (-0.075 0.222 0.0241501)
    Thelen2003Muscle LTpT_T10_r: max_isometric_force=120.5072 optimal_fiber_length=0.1257 tendon_slack_length=0.2131
        pennation_angle_at_optimal=0.2199115
      PathPoint LTpT_t10_R_P1: sacrum (-0.164463 0.0245611 0.01072)
      PathPoint LTpT_t10_R_P2: lumbar4 (-0.04672 0.01796 0.01256)
      PathPoint LTpT_t10_R_P3: lumbar3 (-0.0461 0.01403 0.01441)
      PathPoint LTpT_t10_R_P4: lumbar2 (-0.044 0.00338 0.01525)
      PathPoint LTpT_t10_R_P5: torso (-0.068 0.193 0.0181)
    Thelen2003Muscle LTpT_T11_r: max_isometric_force=115.0784 optimal_fiber_length=0.1092 tendon_slack_length=0.185
        pennation_angle_at_optimal=0.2199115
      PathPoint LTpT_t11_R_P1: sacrum (-0.157649 0.0307094 0.02404)
      PathPoint LTpT_t11_R_P2: lumbar4 (-0.04672 0.017 0.02194)
      PathPoint LTpT_t11_R_P3: lumbar3 (-0.0501482 0.0134888 0.020885)
      PathPoint LTpT_t11_R_P4: lumbar2 (-0.046 0.00338 0.01983)
      PathPoint LTpT_t11_R_P5: torso (-0.059 0.161718 0.01762)
    Thelen2003Muscle LTpT_T12_r: max_isometric_force=94.29293 optimal_fiber_length=0.0863 tendon_slack_length=0.1462
        pennation_angle_at_optimal=0.2199115
      PathPoint LTpT_t12_R_P1: sacrum (-0.14476 0.0488 0.02793)
      PathPoint LTpT_t12_R_P2: lumbar4 (-0.04672 0.017 0.02524)
      PathPoint LTpT_t12_R_P3: lumbar3 (-0.0493674 0.0140564 0.0238974)
      PathPoint LTpT_t12_R_P4: lumbar2 (-0.0458028 0.00398333 0.0225543)
      PathPoint LTpT_t12_R_P5: torso (-0.051 0.133 0.0178539)
    Thelen2003Muscle LTpT_R4_r: max_isometric_force=60.49967 optimal_fiber_length=0.1513 tendon_slack_length=0.2564
        pennation_angle_at_optimal=0.2199115
      PathPoint LTpT_r4_R_P1: lumbar4 (-0.05 0.00705986 0.00282013)
      PathPoint LTpT_r4_R_P2: lumbar2 (-0.05 0.00545622 0.0114779)
      PathPoint LTpT_r4_R_P3: torso (-0.073 0.19 0.0259954)
      PathPoint LTpT_r4_R_P4: torso (-0.074 0.215 0.0285848)
      PathPoint LTpT_r4_R_P5: torso (-0.074 0.243 0.0311206)
      PathPoint LTpT_r4_R_P6: torso (-0.073 0.273 0.0335195)
      PathPoint LTpT_r4_R_P7: torso (-0.065 0.342 0.038393)
    Thelen2003Muscle LTpT_R5_r: max_isometric_force=56.96222 optimal_fiber_length=0.1422 tendon_slack_length=0.2411
        pennation_angle_at_optimal=0.2199115
      PathPoint LTpT_r5_R_P1: lumbar4 (-0.049 0.004 8e-5)
      PathPoint LTpT_r5_R_P2: lumbar2 (-0.049 0.00463268 0.0141962)
      PathPoint LTpT_r5_R_P3: torso (-0.076 0.188 0.0299068)
      PathPoint LTpT_r5_R_P4: torso (-0.075 0.214 0.0319682)
      PathPoint LTpT_r5_R_P5: torso (-0.076 0.243 0.0346445)
      PathPoint LTpT_r5_R_P6: torso (-0.074 0.271 0.037)
      PathPoint LTpT_r5_R_P7: torso (-0.065 0.313 0.0391932)
    Thelen2003Muscle LTpT_R6_r: max_isometric_force=81.40657 optimal_fiber_length=0.1527 tendon_slack_length=0.2339
        pennation_angle_at_optimal=0.2199115
      PathPoint LTpT_r6_R_P1: lumbar5 (-0.038 0.02 0.00021)
      PathPoint LTpT_r6_R_P2: lumbar3 (-0.05 0.0147336 0.010844)
      PathPoint LTpT_r6_R_P3: lumbar2 (-0.046 0.0044 0.014)
      PathPoint LTpT_r6_R_P4: torso (-0.076 0.187 0.0310073)
      PathPoint LTpT_r6_R_P5: torso (-0.076 0.213 0.0346608)
      PathPoint LTpT_r6_R_P6: torso (-0.077 0.242 0.0373467)
      PathPoint LTpT_r6_R_P7: torso (-0.073 0.271 0.04)
      PathPoint LTpT_r6_R_P8: torso (-0.069 0.29 0.04)
    Thelen2003Muscle LTpT_R7_r: max_isometric_force=79.70635 optimal_fiber_length=0.1449 tendon_slack_length=0.2423
        pennation_angle_at_optimal=0.2199115
      PathPoint LTpT_r7_R_P1: sacrum (-0.13132 0.06051 0.00028)
      PathPoint LTpT_r7_R_P2: lumbar4 (-0.0467202 0.0188294 0.00812957)
      PathPoint LTpT_r7_R_P3: lumbar3 (-0.0461005 0.0141694 0.0128553)
      PathPoint LTpT_r7_R_P4: lumbar2 (-0.04399 0.00431532 0.0172724)
      PathPoint LTpT_r7_R_P5: torso (-0.078 0.185 0.0354903)
      PathPoint LTpT_r7_R_P6: torso (-0.079 0.211 0.0395886)
      PathPoint LTpT_r7_R_P7: torso (-0.077 0.243 0.0422488)
      PathPoint LTpT_r7_R_P8: torso (-0.074 0.269 0.0433327)
    Thelen2003Muscle LTpT_R8_r: max_isometric_force=130.0205 optimal_fiber_length=0.1209 tendon_slack_length=0.2466
        pennation_angle_at_optimal=0.2199115
      PathPoint LTpT_r8_R_P1: sacrum (-0.1429 0.05025 0.00037)
      PathPoint LTpT_r8_R_P2: lumbar4 (-0.0465288 0.0181236 0.0113934)
      PathPoint LTpT_r8_R_P3: lumbar3 (-0.0459248 0.014 0.0160395)
      PathPoint LTpT_r8_R_P4: lumbar2 (-0.04399 0.00388 0.0205414)
      PathPoint LTpT_r8_R_P5: torso (-0.079 0.185 0.0407129)
      PathPoint LTpT_r8_R_P6: torso (-0.079 0.209 0.0437166)
      PathPoint LTpT_r8_R_P7: torso (-0.076 0.238 0.0463537)
    Thelen2003Muscle LTpT_R9_r: max_isometric_force=110.6761 optimal_fiber_length=0.1061 tendon_slack_length=0.2592
        pennation_angle_at_optimal=0.2199115
      PathPoint LTpT_r9_R_P1: sacrum (-0.16582 0.02684 0)
      PathPoint LTpT_r9_R_P2: lumbar4 (-0.0467202 0.0176814 0.0148901)
      PathPoint LTpT_r9_R_P3: lumbar3 (-0.0461005 0.0130235 0.0195821)
      PathPoint LTpT_r9_R_P4: lumbar2 (-0.0439905 0.00393671 0.0241884)
      PathPoint LTpT_r9_R_P5: torso (-0.079 0.183 0.043359)
      PathPoint LTpT_r9_R_P6: torso (-0.077 0.203 0.0467599)
    Thelen2003Muscle LTpT_R10_r: max_isometric_force=120.4203 optimal_fiber_length=0.1258 tendon_slack_length=0.2162
        pennation_angle_at_optimal=0.2199115
      PathPoint LTpT_r10_R_P1: sacrum (-0.16446 0.02456 0.01072)
      PathPoint LTpT_r10_R_P2: lumbar4 (-0.0466654 0.0168641 0.0194391)
      PathPoint LTpT_r10_R_P3: lumbar3 (-0.0460454 0.012674 0.023454)
      PathPoint LTpT_r10_R_P4: lumbar2 (-0.0439356 0.00364643 0.027333)
      PathPoint LTpT_r10_R_P5: torso (-0.077 0.176 0.0468867)
    Thelen2003Muscle LTpT_R11_r: max_isometric_force=115.3854 optimal_fiber_length=0.1176 tendon_slack_length=0.1675
        pennation_angle_at_optimal=0.2199115
      PathPoint LTpT_r11_R_P1: sacrum (-0.15765 0.03071 0.02404)
      PathPoint LTpT_r11_R_P2: lumbar4 (-0.0461 0.01796 0.0294188)
      PathPoint LTpT_r11_R_P3: lumbar3 (-0.0461 0.0139338 0.0325773)
      PathPoint LTpT_r11_R_P4: lumbar2 (-0.0440238 0.00448 0.0355734)
      PathPoint LTpT_r11_R_P5: torso (-0.0650216 0.147656 0.045555)
    Thelen2003Muscle LTpT_R12_r: max_isometric_force=94.32635 optimal_fiber_length=0.0736 tendon_slack_length=0.1431
        pennation_angle_at_optimal=0.2199115
      PathPoint LTpT_r12_R_P1: sacrum (-0.14476 0.0488 0.02793)
      PathPoint LTpT_r12_R_P2: lumbar4 (-0.04672 0.0175766 0.0335072)
      PathPoint LTpT_r12_R_P3: lumbar3 (-0.0461 0.0136439 0.0358736)
      PathPoint LTpT_r12_R_P4: lumbar2 (-0.044 0.0044 0.0388153)
      PathPoint LTpT_r12_R_P5: torso (-0.0450351 0.12 0.0466148)
    Thelen2003Muscle LTpT_T1_l: max_isometric_force=325.8947 optimal_fiber_length=0.1102 tendon_slack_length=0.261
        pennation_angle_at_optimal=0.2199115
      PathPoint LTpT_t1_L_P1: lumbar1 (-0.048 -0.013 -0.00321)
      PathPoint LTpT_t1_L_P2: torso (-0.05 0.405 -0.02615)
      PathWrap: wrap_object=Chest_l method=hybrid
    Thelen2003Muscle LTpT_T2_l: max_isometric_force=240.6609 optimal_fiber_length=0.1154 tendon_slack_length=0.2774
        pennation_angle_at_optimal=0.2199115
      PathPoint LTpT_t2_L_P1: lumbar2 (-0.047 -0.014 -0.004)
      PathPoint LTpT_t2_L_P2: torso (-0.055 0.386 -0.02654)
      PathWrap: wrap_object=Chest_l method=hybrid
    Thelen2003Muscle LTpT_T3_l: max_isometric_force=172.5042 optimal_fiber_length=0.117 tendon_slack_length=0.2814
        pennation_angle_at_optimal=0.2199115
      PathPoint LTpT_t3_L_P1: lumbar3 (-0.049 -0.004 -0.00407)
      PathPoint LTpT_t3_L_P2: lumbar1 (-0.03711 -0.01402 -0.005)
      PathPoint LTpT_t3_L_P3: torso (-0.061 0.365 -0.02598)
      PathWrap: wrap_object=Chest_l method=hybrid
    Thelen2003Muscle LTpT_T4_l: max_isometric_force=60.57609 optimal_fiber_length=0.1172 tendon_slack_length=0.2819
        pennation_angle_at_optimal=0.2199115
      PathPoint LTpT_t4_L_P1: lumbar4 (-0.049 0.00705986 -0.00282)
      PathPoint LTpT_t4_L_P2: lumbar1 (-0.0371129 -0.0140247 -0.00612)
      PathPoint LTpT_t4_L_P3: torso (-0.07 0.343 -0.02615)
      PathWrap: wrap_object=Chest_l method=hybrid
    Thelen2003Muscle LTpT_T5_l: max_isometric_force=57.01232 optimal_fiber_length=0.1096 tendon_slack_length=0.2635
        pennation_angle_at_optimal=0.2199115
      PathPoint LTpT_t5_L_P1: lumbar4 (-0.0473001 0.00396965 -8e-5)
      PathPoint LTpT_t5_L_P2: lumbar2 (-0.044 0.0044 -0.0064)
      PathPoint LTpT_t5_L_P3: torso (-0.074 0.32 -0.02808)
      PathWrap: wrap_object=Chest_l method=hybrid
    Thelen2003Muscle LTpT_T6_l: max_isometric_force=81.40657 optimal_fiber_length=0.1146 tendon_slack_length=0.2619
        pennation_angle_at_optimal=0.2199115
      PathPoint LTpT_t6_L_P1: lumbar5 (-0.038 0.018 -0.00021)
      PathPoint LTpT_t6_L_P2: lumbar2 (-0.044 0.0044 -0.009)
      PathPoint LTpT_t6_L_P3: torso (-0.073 0.19 -0.01547)
      PathPoint LTpT_t6_L_P4: torso (-0.08 0.294 -0.02766)
    Thelen2003Muscle LTpT_T7_l: max_isometric_force=79.70635 optimal_fiber_length=0.1304 tendon_slack_length=0.2467
        pennation_angle_at_optimal=0.2199115
      PathPoint LTpT_t7_L_P1: sacrum (-0.131317 0.0605127 -0.00028)
      PathPoint LTpT_t7_L_P2: lumbar2 (-0.04399 0.0044 -0.011)
      PathPoint LTpT_t7_L_P3: torso (-0.073 0.191 -0.019)
      PathPoint LTpT_t7_L_P4: torso (-0.08 0.267 -0.026)
    Thelen2003Muscle LTpT_T8_l: max_isometric_force=120.4665 optimal_fiber_length=0.1391 tendon_slack_length=0.2197
        pennation_angle_at_optimal=0.2199115
      PathPoint LTpT_t8_L_P1: sacrum (-0.142901 0.0502456 -0.00037)
      PathPoint LTpT_t8_L_P2: lumbar4 (-0.0469739 0.0180443 -0.00566)
      PathPoint LTpT_t8_L_P3: lumbar3 (-0.0467498 0.0135459 -0.00832)
      PathPoint LTpT_t8_L_P4: lumbar2 (-0.0453159 0.00310151 -0.01094)
      PathPoint LTpT_t8_L_P5: torso (-0.079 0.241 -0.0255)
    Thelen2003Muscle LTpT_T9_l: max_isometric_force=139.4342 optimal_fiber_length=0.1368 tendon_slack_length=0.2318
        pennation_angle_at_optimal=0.2199115
      PathPoint LTpT_t9_L_P1: sacrum (-0.165822 0.0268352 0)
      PathPoint LTpT_t9_L_P2: lumbar4 (-0.04672 0.01796 -0.00748)
      PathPoint LTpT_t9_L_P3: lumbar3 (-0.0464295 0.0138534 -0.00969)
      PathPoint LTpT_t9_L_P4: lumbar2 (-0.0447163 0.00347304 -0.012)
      PathPoint LTpT_t9_L_P5: torso (-0.075 0.222 -0.024)
    Thelen2003Muscle LTpT_T10_l: max_isometric_force=120.5072 optimal_fiber_length=0.1257 tendon_slack_length=0.2131
        pennation_angle_at_optimal=0.2199115
      PathPoint LTpT_t10_L_P1: sacrum (-0.164463 0.0245611 -0.01072)
      PathPoint LTpT_t10_L_P2: lumbar4 (-0.04672 0.01796 -0.01256)
      PathPoint LTpT_t10_L_P3: lumbar3 (-0.0461 0.01403 -0.01441)
      PathPoint LTpT_t10_L_P4: lumbar2 (-0.044 0.00338 -0.01525)
      PathPoint LTpT_t10_L_P5: torso (-0.068 0.193 -0.018)
    Thelen2003Muscle LTpT_T11_l: max_isometric_force=115.0784 optimal_fiber_length=0.1092 tendon_slack_length=0.185
        pennation_angle_at_optimal=0.2199115
      PathPoint LTpT_t11_L_P1: sacrum (-0.157649 0.0307094 -0.02404)
      PathPoint LTpT_t11_L_P2: lumbar4 (-0.04672 0.017 -0.02194)
      PathPoint LTpT_t11_L_P3: lumbar3 (-0.0501482 0.0134888 -0.02088)
      PathPoint LTpT_t11_L_P4: lumbar2 (-0.046 0.00338 -0.01983)
      PathPoint LTpT_t11_L_P5: torso (-0.060879 0.161718 -0.01762)
    Thelen2003Muscle LTpT_T12_l: max_isometric_force=94.29293 optimal_fiber_length=0.0863 tendon_slack_length=0.1462
        pennation_angle_at_optimal=0.2199115
      PathPoint LTpT_t12_L_P1: sacrum (-0.14476 0.0488 -0.028)
      PathPoint LTpT_t12_L_P2: lumbar4 (-0.04672 0.017 -0.025)
      PathPoint LTpT_t12_L_P3: lumbar3 (-0.0493674 0.0140564 -0.024)
      PathPoint LTpT_t12_L_P4: lumbar2 (-0.0458028 0.00398333 -0.023)
      PathPoint LTpT_t12_L_P5: torso (-0.051 0.133 -0.018)
    Thelen2003Muscle LTpT_R4_l: max_isometric_force=60.49968 optimal_fiber_length=0.1513 tendon_slack_length=0.2564
        pennation_angle_at_optimal=0.2199115
      PathPoint LTpT_r4_L_P1: lumbar4 (-0.05 0.007 -0.00282)
      PathPoint LTpT_r4_L_P2: lumbar2 (-0.05 0.005 -0.01148)
      PathPoint LTpT_r4_L_P3: torso (-0.073 0.19 -0.026)
      PathPoint LTpT_r4_L_P4: torso (-0.074 0.215 -0.02858)
      PathPoint LTpT_r4_L_P5: torso (-0.074 0.243 -0.03112)
      PathPoint LTpT_r4_L_P6: torso (-0.073 0.273 -0.03352)
      PathPoint LTpT_r4_L_P7: torso (-0.065 0.342 -0.03839)
    Thelen2003Muscle LTpT_R5_l: max_isometric_force=56.96222 optimal_fiber_length=0.1422 tendon_slack_length=0.2411
        pennation_angle_at_optimal=0.2199115
      PathPoint LTpT_r5_L_P1: lumbar4 (-0.049 0.00396965 -8e-5)
      PathPoint LTpT_r5_L_P2: lumbar2 (-0.049 0.014 -0.0142)
      PathPoint LTpT_r5_L_P3: torso (-0.076 0.188 -0.02991)
      PathPoint LTpT_r5_L_P4: torso (-0.075 0.213 -0.03197)
      PathPoint LTpT_r5_L_P5: torso (-0.076 0.243 -0.03464)
      PathPoint LTpT_r5_L_P6: torso (-0.074 0.271 -0.03652)
      PathPoint LTpT_r5_L_P7: torso (-0.065 0.313 -0.03919)
    Thelen2003Muscle LTpT_R6_l: max_isometric_force=81.40657 optimal_fiber_length=0.1527 tendon_slack_length=0.2339
        pennation_angle_at_optimal=0.2199115
      PathPoint LTpT_r6_L_P1: lumbar5 (-0.038 0.02 -0.00021)
      PathPoint LTpT_r6_L_P2: lumbar3 (-0.05 0.0147336 -0.01084)
      PathPoint LTpT_r6_L_P3: lumbar2 (-0.046 0.0044 -0.014)
      PathPoint LTpT_r6_L_P4: torso (-0.076 0.187 -0.031)
      PathPoint LTpT_r6_L_P5: torso (-0.076 0.213 -0.03466)
      PathPoint LTpT_r6_L_P6: torso (-0.077 0.242 -0.03735)
      PathPoint LTpT_r6_L_P7: torso (-0.073 0.271 -0.03952)
      PathPoint LTpT_r6_L_P8: torso (-0.069 0.29 -0.0401)
    Thelen2003Muscle LTpT_R7_l: max_isometric_force=79.70635 optimal_fiber_length=0.1449 tendon_slack_length=0.2423
        pennation_angle_at_optimal=0.2199115
      PathPoint LTpT_r7_L_P1: sacrum (-0.13132 0.061 -0.00028)
      PathPoint LTpT_r7_L_P2: lumbar4 (-0.0467202 0.019 -0.008)
      PathPoint LTpT_r7_L_P3: lumbar3 (-0.0461005 0.014 -0.01286)
      PathPoint LTpT_r7_L_P4: lumbar2 (-0.04399 0.004 -0.01727)
      PathPoint LTpT_r7_L_P5: torso (-0.078 0.185 -0.03549)
      PathPoint LTpT_r7_L_P6: torso (-0.079 0.211 -0.03959)
      PathPoint LTpT_r7_L_P7: torso (-0.077 0.243 -0.04225)
      PathPoint LTpT_r7_L_P8: torso (-0.074 0.269 -0.04333)
    Thelen2003Muscle LTpT_R8_l: max_isometric_force=130.0205 optimal_fiber_length=0.1209 tendon_slack_length=0.2466
        pennation_angle_at_optimal=0.2199115
      PathPoint LTpT_r8_L_P1: sacrum (-0.1429 0.05025 -0.00037)
      PathPoint LTpT_r8_L_P2: lumbar4 (-0.0465288 0.0181236 -0.01139)
      PathPoint LTpT_r8_L_P3: lumbar3 (-0.0459248 0.0135047 -0.01604)
      PathPoint LTpT_r8_L_P4: lumbar2 (-0.04399 0.00388 -0.02054)
      PathPoint LTpT_r8_L_P5: torso (-0.079 0.185 -0.04071)
      PathPoint LTpT_r8_L_P6: torso (-0.079 0.209 -0.04372)
      PathPoint LTpT_r8_L_P7: torso (-0.076 0.238 -0.04635)
    Thelen2003Muscle LTpT_R9_l: max_isometric_force=110.6761 optimal_fiber_length=0.1061 tendon_slack_length=0.2592
        pennation_angle_at_optimal=0.2199115
      PathPoint LTpT_r9_L_P1: sacrum (-0.16582 0.02684 0)
      PathPoint LTpT_r9_L_P2: lumbar4 (-0.0467202 0.0176814 -0.01489)
      PathPoint LTpT_r9_L_P3: lumbar3 (-0.0461005 0.0130235 -0.01958)
      PathPoint LTpT_r9_L_P4: lumbar2 (-0.0439905 0.00393671 -0.02419)
      PathPoint LTpT_r9_L_P5: torso (-0.079 0.183 -0.04336)
      PathPoint LTpT_r9_L_P6: torso (-0.077 0.203 -0.047)
    Thelen2003Muscle LTpT_R10_l: max_isometric_force=120.4203 optimal_fiber_length=0.1258 tendon_slack_length=0.2162
        pennation_angle_at_optimal=0.2199115
      PathPoint LTpT_r10_L_P1: sacrum (-0.16446 0.02456 -0.01072)
      PathPoint LTpT_r10_L_P2: lumbar4 (-0.0466654 0.0168641 -0.01944)
      PathPoint LTpT_r10_L_P3: lumbar3 (-0.0460454 0.012674 -0.02345)
      PathPoint LTpT_r10_L_P4: lumbar2 (-0.0439356 0.00364643 -0.02733)
      PathPoint LTpT_r10_L_P5: torso (-0.077 0.176 -0.047)
    Thelen2003Muscle LTpT_R11_l: max_isometric_force=115.3853 optimal_fiber_length=0.1176 tendon_slack_length=0.1675
        pennation_angle_at_optimal=0.2199115
      PathPoint LTpT_r11_L_P1: sacrum (-0.15765 0.03071 -0.02404)
      PathPoint LTpT_r11_L_P2: lumbar4 (-0.0461 0.01796 -0.02942)
      PathPoint LTpT_r11_L_P3: lumbar3 (-0.0461 0.0139338 -0.03258)
      PathPoint LTpT_r11_L_P4: lumbar2 (-0.0440238 0.00448 -0.03557)
      PathPoint LTpT_r11_L_P5: torso (-0.0650216 0.147656 -0.04556)
    Thelen2003Muscle LTpT_R12_l: max_isometric_force=94.32651 optimal_fiber_length=0.0736 tendon_slack_length=0.1431
        pennation_angle_at_optimal=0.2199115
      PathPoint LTpT_r12_L_P1: sacrum (-0.14476 0.049 -0.028)
      PathPoint LTpT_r12_L_P2: lumbar4 (-0.047 0.018 -0.034)
      PathPoint LTpT_r12_L_P3: lumbar3 (-0.0461 0.0136439 -0.03587)
      PathPoint LTpT_r12_L_P4: lumbar2 (-0.044 0.0044 -0.03882)
      PathPoint LTpT_r12_L_P5: torso (-0.0450351 0.12 -0.047)
    Thelen2003Muscle LTpL_L5_r: max_isometric_force=157.7955 optimal_fiber_length=0.0515 tendon_slack_length=0.001
        pennation_angle_at_optimal=0.2199115
      PathPoint LTpL_L5_L_P1: sacrum (-0.138531 0.0631285 0.0455109)
      PathPoint LTpL_L5_L_P2: lumbar5 (-0.013153 0.028534 0.0258423)
    Thelen2003Muscle LTpL_L4_r: max_isometric_force=151.8409 optimal_fiber_length=0.0437 tendon_slack_length=0.0471
        pennation_angle_at_optimal=0.2199115
      PathPoint LTpL_L4_L_P1: pelvis (-0.133 0.041 0.048)
      PathPoint LTpL_L4_L_P2: lumbar4 (-0.023 0.027038 0.0254663)
    Thelen2003Muscle LTpL_L3_r: max_isometric_force=121.2841 optimal_fiber_length=0.0592 tendon_slack_length=0.0643
        pennation_angle_at_optimal=0.2199115
      PathPoint LTpL_L3_L_P1: pelvis (-0.14 0.041 0.051)
      PathPoint LTpL_L3_L_P2: lumbar3 (-0.0297706 0.0229639 0.0232018)
    Thelen2003Muscle LTpL_L2_r: max_isometric_force=108.3816 optimal_fiber_length=0.0757 tendon_slack_length=0.0833
        pennation_angle_at_optimal=0.2199115
      PathPoint LTpL_L2_L_P1: pelvis (-0.142 0.037 0.053)
      PathPoint LTpL_L2_L_P2: lumbar2 (-0.0299692 0.0143552 0.0220597)
    Thelen2003Muscle LTpL_L1_r: max_isometric_force=106.1599 optimal_fiber_length=0.0904 tendon_slack_length=0.1053
        pennation_angle_at_optimal=0.2199115
      PathPoint LTpL_L1_L_P1: pelvis (-0.144121 0.0335392 0.0535739)
      PathPoint LTpL_L1_L_P2: lumbar1 (-0.0316208 0.0166569 0.0228226)
    Thelen2003Muscle LTpL_L5_l: max_isometric_force=157.7955 optimal_fiber_length=0.0515 tendon_slack_length=0.001
        pennation_angle_at_optimal=0.2199115
      PathPoint LTpL_L5_l_P1: sacrum (-0.139 0.063 -0.046)
      PathPoint LTpL_L5_l_P2: lumbar5 (-0.013 0.029 -0.026)
    Thelen2003Muscle LTpL_L4_l: max_isometric_force=151.8409 optimal_fiber_length=0.0437 tendon_slack_length=0.0471
        pennation_angle_at_optimal=0.2199115
      PathPoint LTpL_L4_l_P1: pelvis (-0.133 0.041 -0.048)
      PathPoint LTpL_L4_l_P2: lumbar4 (-0.023 0.027 -0.025)
    Thelen2003Muscle LTpL_L3_l: max_isometric_force=121.2841 optimal_fiber_length=0.0592 tendon_slack_length=0.0643
        pennation_angle_at_optimal=0.2199115
      PathPoint LTpL_L3_l_P1: pelvis (-0.14 0.041 -0.051)
      PathPoint LTpL_L3_l_P2: lumbar3 (-0.03 0.023 -0.023)
    Thelen2003Muscle LTpL_L2_l: max_isometric_force=108.3816 optimal_fiber_length=0.0757 tendon_slack_length=0.0833
        pennation_angle_at_optimal=0.2199115
      PathPoint LTpL_L2_l_P1: pelvis (-0.142 0.037 -0.053)
      PathPoint LTpL_L2_l_P2: lumbar2 (-0.03 0.014 -0.022)
    Thelen2003Muscle LTpL_L1_l: max_isometric_force=106.1599 optimal_fiber_length=0.0904 tendon_slack_length=0.1053
        pennation_angle_at_optimal=0.2199115
      PathPoint LTpL_L1_l_P1: pelvis (-0.144 0.034 -0.054)
      PathPoint LTpL_L1_l_P2: lumbar1 (-0.032 0.017 -0.023)
    Millard2012EquilibriumMuscle [values shared by the 52 below unless stated]: pennation_angle_at_optimal=0 [radians]
        minimum_activation=0.01
      ActiveForceLengthCurve: minimum_value=0
      ForceVelocityCurve: concentric_slope_at_vmax=0 concentric_slope_near_vmax=0.25 isometric_slope=5
          eccentric_slope_at_vmax=0 eccentric_slope_near_vmax=0.15 max_eccentric_velocity_force_multiplier=1.4
      FiberForceLengthCurve
      TendonForceLengthCurve
    Millard2012EquilibriumMuscle EO1_r: max_isometric_force=111.744 optimal_fiber_length=0.0358775
        tendon_slack_length=0.0569831
      PathPoint EO1_r_P1: Abdomen (0.006 0.048 0.021)
      PathPoint EO1_r_P2: torso (0.093 0.174 0.093)
    Millard2012EquilibriumMuscle EO2_r: max_isometric_force=132.3546 optimal_fiber_length=0.0379268
        tendon_slack_length=0.055165
      PathPoint EO2_r_P1: torso (0.091 0.141 0.105)
      PathPoint EO2_r_P2: Abdomen (0.008 0.023 0.033)
    Millard2012EquilibriumMuscle EO3_r: max_isometric_force=138.8978 optimal_fiber_length=0.038402
        tendon_slack_length=0.046576
      PathPoint EO3_r_P1: torso (0.0785075 0.10052 0.113587)
      PathPoint EO3_r_P2: Abdomen (0.00677141 -0.008 0.033)
    Millard2012EquilibriumMuscle EO4_r: max_isometric_force=134.0928 optimal_fiber_length=0.03929399
        tendon_slack_length=0.044785
      PathPoint EO4_r_P1: torso (0.0697082 0.0831956 0.112156)
      PathPoint default: Abdomen (0.006 -0.024 0.031)
    Millard2012EquilibriumMuscle EO5_r: max_isometric_force=155.945 optimal_fiber_length=0.0470542
        tendon_slack_length=0.0515216
      PathPoint EO5_r_P1: torso (0.001 0.11 0.112)
      PathPoint EO5_r_P2: pelvis (-0.055 0.082 0.102)
    Millard2012EquilibriumMuscle EO6_r: max_isometric_force=226.9645 optimal_fiber_length=0.05652438
        tendon_slack_length=0.05713
      PathPoint EO6_r_P1: torso (-0.011 0.093 0.1)
      PathPoint EO6_r_P2: pelvis (-0.069 0.093 0.098)
    Millard2012EquilibriumMuscle IO1_r: max_isometric_force=123.9794 optimal_fiber_length=0.101
        tendon_slack_length=0.0112
      PathPoint IO1_r_P1: Abdomen (0.00306951 -0.047 0.044)
      PathPoint IO1_r_P2: pelvis (-0.009 0.025 0.126)
    Millard2012EquilibriumMuscle IO2_r: max_isometric_force=150.0727 optimal_fiber_length=0.1049
        tendon_slack_length=0.0117
      PathPoint IO2_r_P1: Abdomen (0.003 -0.022 0.052)
      PathPoint IO2_r_P2: pelvis (-0.024 0.049 0.128)
    Millard2012EquilibriumMuscle IO3_r: max_isometric_force=151.2072 optimal_fiber_length=0.1242
        tendon_slack_length=0.0138
      PathPoint IO3_r_P1: Abdomen (0.005 0.007 0.049)
      PathPoint IO3_r_P2: pelvis (-0.039 0.069 0.117)
    Millard2012EquilibriumMuscle IO4_r: max_isometric_force=179.0459 optimal_fiber_length=0.1046
        tendon_slack_length=0.0116
      PathPoint IO4_r_P1: torso (0.066 0.108 0.121)
      PathPoint IO4_r_P2: pelvis (-0.053 0.082 0.1)
    Millard2012EquilibriumMuscle IO5_r: max_isometric_force=157.0833 optimal_fiber_length=0.1067
        tendon_slack_length=0.0119
      PathPoint IO5_r_P1: torso (0.03 0.096 0.115)
      PathPoint IO5_r_P2: pelvis (-0.074 0.094 0.079)
    Millard2012EquilibriumMuscle IO6_r: max_isometric_force=138.6115 optimal_fiber_length=0.1003
        tendon_slack_length=0.0111
      PathPoint IO6_r_P1: torso (0 0.086 0.1)
      PathPoint IO6_r_P2: pelvis (-0.09 0.088 0.066)
    Millard2012EquilibriumMuscle EO1_l: max_isometric_force=111.744 optimal_fiber_length=0.0358775
        tendon_slack_length=0.0569831
      PathPoint EO1_l_P1: Abdomen (0.006 0.048 -0.021)
      PathPoint EO1_l_P2: torso (0.0895924 0.170642 -0.0991386)
    Millard2012EquilibriumMuscle EO2_l: max_isometric_force=132.3546 optimal_fiber_length=0.0379268
        tendon_slack_length=0.055165
      PathPoint EO2_l_P1: torso (0.091 0.141 -0.10478)
      PathPoint EO2_l_P2: Abdomen (0.008 0.023 -0.033)
    Millard2012EquilibriumMuscle EO3_l: max_isometric_force=138.8978 optimal_fiber_length=0.038402
        tendon_slack_length=0.046576
      PathPoint EO3_l_P1: torso (0.079 0.101 -0.114)
      PathPoint EO3_l_P2: Abdomen (0.00663296 -0.00763095 -0.0325901)
    Millard2012EquilibriumMuscle EO4_l: max_isometric_force=134.0928 optimal_fiber_length=0.03929399
        tendon_slack_length=0.044785
      PathPoint EO4_l_P1: torso (0.07 0.083 -0.112)
      PathPoint EO4_l_P2: Abdomen (0.0063871 -0.0235714 -0.0306404)
    Millard2012EquilibriumMuscle EO5_l: max_isometric_force=155.945 optimal_fiber_length=0.0470542
        tendon_slack_length=0.0515216
      PathPoint EO5_l_P1: torso (0.000805328 0.110148 -0.111596)
      PathPoint EO5_l_P2: pelvis (-0.054703 0.0815326 -0.102158)
    Millard2012EquilibriumMuscle EO6_l: max_isometric_force=226.9645 optimal_fiber_length=0.05652438
        tendon_slack_length=0.05713
      PathPoint EO6_l_P1: torso (-0.011 0.093 -0.1)
      PathPoint EO6_l_P2: pelvis (-0.069 0.093 -0.089)
    Millard2012EquilibriumMuscle IO1_l: max_isometric_force=123.9794 optimal_fiber_length=0.101
        tendon_slack_length=0.0112
      PathPoint IO1_l_P1: Abdomen (0.003 -0.047 -0.044)
      PathPoint IO1_l_P2: pelvis (-0.00903731 0.0246453 -0.126019)
    Millard2012EquilibriumMuscle IO2_l: max_isometric_force=150.0727 optimal_fiber_length=0.1049
        tendon_slack_length=0.0117
      PathPoint IO2_l_P1: Abdomen (0.003 -0.022 -0.052)
      PathPoint IO2_l_P2: pelvis (-0.0242023 0.0485047 -0.127423)
    Millard2012EquilibriumMuscle IO3_l: max_isometric_force=151.2072 optimal_fiber_length=0.1242
        tendon_slack_length=0.0138
      PathPoint IO3_l_P1: Abdomen (0.005 0.007 -0.049)
      PathPoint IO3_l_P2: pelvis (-0.0385031 0.0687193 -0.116768)
    Millard2012EquilibriumMuscle IO4_l: max_isometric_force=179.0459 optimal_fiber_length=0.1046
        tendon_slack_length=0.0116
      PathPoint IO4_l_P1: torso (0.0656579 0.107855 -0.121297)
      PathPoint IO4_l_P2: pelvis (-0.052598 0.0818011 -0.0996565)
    Millard2012EquilibriumMuscle IO5_l: max_isometric_force=157.0833 optimal_fiber_length=0.1067
        tendon_slack_length=0.0119
      PathPoint IO5_l_P1: torso (0.0302908 0.0959854 -0.114995)
      PathPoint IO5_l_P2: pelvis (-0.0738758 0.0936339 -0.0790343)
    Millard2012EquilibriumMuscle IO6_l: max_isometric_force=138.6115 optimal_fiber_length=0.1003
        tendon_slack_length=0.0111
      PathPoint IO6_l_P1: torso (0 0.086 -0.1)
      PathPoint IO6_l_P2: pelvis (-0.09 0.088 -0.066)
    Millard2012EquilibriumMuscle LD_L1_r: max_isometric_force=90.39921 optimal_fiber_length=0.3319
        tendon_slack_length=0.0725
      PathPoint LD_L1_r_P1: lumbar1 (-0.045 -0.013 0.00433164)
      PathPoint LD_L1_r_P2: humerus_r (-0.00948737 -0.0152526 0.00268873)
      PathWrap: wrap_object=Chest_r method=hybrid
    Millard2012EquilibriumMuscle LD_L2_r: max_isometric_force=84.53986 optimal_fiber_length=0.3571
        tendon_slack_length=0.078
      PathPoint LD_L2_r_P1: lumbar2 (-0.043 -0.0134148 0.00414584)
      PathPoint LD_L2_r_P2: humerus_r (-0.00949 -0.01525 0.00269)
      PathWrap: wrap_object=Chest_r method=hybrid
    Millard2012EquilibriumMuscle LD_L3_r: max_isometric_force=104.5178 optimal_fiber_length=0.378
        tendon_slack_length=0.0825
      PathPoint LD_L3_r_P1: lumbar3 (-0.046 -0.004 0.00385971)
      PathPoint LD_L3_r_P2: humerus_r (-0.00949 -0.01525 0.00433)
      PathWrap: wrap_object=Chest_r method=hybrid
    Millard2012EquilibriumMuscle LD_L4_r: max_isometric_force=100.7279 optimal_fiber_length=0.3949
        tendon_slack_length=0.0862
      PathPoint LD_L4_r_P1: lumbar4 (-0.045 0.005 0.00462278)
      PathPoint LD_L4_r_P2: humerus_r (-0.00949 -0.01525 0.00269)
      PathWrap: wrap_object=Chest_r method=hybrid
    Millard2012EquilibriumMuscle LD_L5_r: max_isometric_force=101.6877 optimal_fiber_length=0.4173
        tendon_slack_length=0.0857
      PathPoint LD_L5_r_P1: lumbar5 (-0.036 0.021 0.00411073)
      PathPoint LD_L5_r_P2: humerus_r (-0.00949 -0.01525 0.00269)
      PathWrap: wrap_object=Chest_r method=hybrid
    Millard2012EquilibriumMuscle LD_T12_r: max_isometric_force=53.70586 optimal_fiber_length=0.3159
        tendon_slack_length=0.0649
      PathPoint LD_T12_r_P1: humerus_r (-0.00949 -0.01525 0.00269)
      PathPoint LD_T12_r_P2: torso (-0.052 0.102 0.0043635)
      PathWrap: wrap_object=Chest_r method=hybrid range=(1 2)
    Millard2012EquilibriumMuscle LD_T11_r: max_isometric_force=62.91767 optimal_fiber_length=0.2951
        tendon_slack_length=0.0606
      PathPoint LD_T11_r_P1: humerus_r (-0.00949 -0.01525 0.00269)
      PathPoint LD_T11_r_P2: torso (-0.0631214 0.131 0.003)
      PathWrap: wrap_object=Chest_r method=hybrid
    Millard2012EquilibriumMuscle LD_T10_r: max_isometric_force=64.47899 optimal_fiber_length=0.2913
        tendon_slack_length=0.0456
      PathPoint LD_T10_r_P1: humerus_r (-0.00949 -0.01525 0.00269)
      PathPoint LD_T10_r_P2: torso (-0.069 0.158 0.00382991)
      PathWrap: wrap_object=Chest_r method=hybrid
    Millard2012EquilibriumMuscle LD_T9_r: max_isometric_force=40.62457 optimal_fiber_length=0.2549
        tendon_slack_length=0.0399
      PathPoint LD_T9_r_P1: humerus_r (-0.00949 -0.01525 0.00269)
      PathPoint LD_T9_r_P2: torso (-0.079 0.194 0.00407649)
      PathWrap: wrap_object=Chest_r method=hybrid
    Millard2012EquilibriumMuscle LD_T8_r: max_isometric_force=40.79471 optimal_fiber_length=0.2368
        tendon_slack_length=0.0486
      PathPoint LD_T8_r_P1: humerus_r (-0.00949 -0.01525 0.00269)
      PathPoint LD_T8_r_P2: torso (-0.081 0.215 0.00427544)
      PathWrap: wrap_object=Chest_r method=hybrid
    Millard2012EquilibriumMuscle LD_T7_r: max_isometric_force=37.075 optimal_fiber_length=0.223
        tendon_slack_length=0.0458
      PathPoint LD_T7_r_P1: humerus_r (-0.00949 -0.01525 0.00269)
      PathPoint LD_T7_r_P2: torso (-0.09 0.235 0.00407354)
      PathWrap: wrap_object=Chest_r method=hybrid
    Millard2012EquilibriumMuscle LD_R12_r: max_isometric_force=42.9003 optimal_fiber_length=0.2737
        tendon_slack_length=0.0562
      PathPoint LD_R12_r_P1: humerus_r (-0.00949 -0.01525 0.00269)
      PathPoint LD_R12_r_P2: torso (-0.045 0.121579 0.0442662)
    Millard2012EquilibriumMuscle LD_R11_r: max_isometric_force=63.33357 optimal_fiber_length=0.239
        tendon_slack_length=0.0491
      PathPoint LD_R11_r_P1: humerus_r (-0.00949 -0.01525 0.00433)
      PathPoint LD_R11_r_P2: torso (-0.068 0.14 0.063)
      PathWrap: wrap_object=Chest_r method=hybrid
    Millard2012EquilibriumMuscle LD_Il_r: max_isometric_force=65.36625 optimal_fiber_length=0.465
        tendon_slack_length=0.0201
      PathPoint LD_Il_r_P1: pelvis (-0.126226 0.055 0.048683)
      PathPoint LD_Il_r_P2: humerus_r (-0.00949 -0.01525 0.00269)
      PathWrap: wrap_object=Chest_r method=hybrid
    Millard2012EquilibriumMuscle LD_L1_l: max_isometric_force=90.39872 optimal_fiber_length=0.3319
        tendon_slack_length=0.0725
      PathPoint LD_L1_l_P1: lumbar1 (-0.045 -0.013 -0.00433)
      PathPoint LD_L1_l_P2: humerus_l (-0.00948737 -0.01525 -0.00269)
      PathWrap: wrap_object=Chest_l method=hybrid
    Millard2012EquilibriumMuscle LD_L2_l: max_isometric_force=84.53965 optimal_fiber_length=0.3571
        tendon_slack_length=0.078
      PathPoint LD_L2_l_P1: lumbar2 (-0.043 -0.01341 -0.00415)
      PathPoint LD_L2_l_P2: humerus_l (-0.00949 -0.01525 -0.00269)
      PathWrap: wrap_object=Chest_l method=hybrid
    Millard2012EquilibriumMuscle LD_L3_l: max_isometric_force=104.5179 optimal_fiber_length=0.378
        tendon_slack_length=0.0825
      PathPoint LD_L3_l_P1: lumbar3 (-0.046 -0.004 -0.00386)
      PathPoint LD_L3_l_P2: humerus_l (-0.00949 -0.01525 -0.00433)
      PathWrap: wrap_object=Chest_l method=hybrid
    Millard2012EquilibriumMuscle LD_L4_l: max_isometric_force=100.7277 optimal_fiber_length=0.3949
        tendon_slack_length=0.0862
      PathPoint LD_L4_l_P1: lumbar4 (-0.045 0.005 -0.00462)
      PathPoint LD_L4_l_P2: humerus_l (-0.00949 -0.01525 -0.00269)
      PathWrap: wrap_object=Chest_l method=hybrid
    Millard2012EquilibriumMuscle LD_L5_l: max_isometric_force=101.6877 optimal_fiber_length=0.4173
        tendon_slack_length=0.0857
      PathPoint LD_L5_l_P1: lumbar5 (-0.036 0.021 -0.00411)
      PathPoint LD_L5_l_P2: humerus_l (-0.00949 -0.01525 -0.00269)
      PathWrap: wrap_object=Chest_l method=hybrid
    Millard2012EquilibriumMuscle LD_T12_l: max_isometric_force=53.70584 optimal_fiber_length=0.3159
        tendon_slack_length=0.0649
      PathPoint LD_T12_l_P1: humerus_l (-0.00949 -0.01525 -0.00269)
      PathPoint LD_T12_l_P2: torso (-0.052 0.102 -0.00436)
      PathWrap: wrap_object=Chest_l method=hybrid
    Millard2012EquilibriumMuscle LD_T11_l: max_isometric_force=62.91771 optimal_fiber_length=0.2951
        tendon_slack_length=0.0606
      PathPoint LD_T11_l_P1: humerus_l (-0.00949 -0.01525 -0.00269)
      PathPoint LD_T11_l_P2: torso (-0.0631214 0.131 -0.00346)
      PathWrap: wrap_object=Chest_l method=hybrid
    Millard2012EquilibriumMuscle LD_T10_l: max_isometric_force=64.47901 optimal_fiber_length=0.2913
        tendon_slack_length=0.0456
      PathPoint LD_T10_l_P1: humerus_l (-0.00949 -0.01525 -0.00269)
      PathPoint LD_T10_l_P2: torso (-0.069 0.158 -0.00383)
      PathWrap: wrap_object=Chest_l method=hybrid
    Millard2012EquilibriumMuscle LD_T9_l: max_isometric_force=40.62456 optimal_fiber_length=0.2549
        tendon_slack_length=0.0399
      PathPoint LD_T9_l_P1: humerus_l (-0.00949 -0.01525 -0.00269)
      PathPoint LD_T9_l_P2: torso (-0.079 0.194 -0.00408)
      PathWrap: wrap_object=Chest_l method=hybrid
    Millard2012EquilibriumMuscle LD_T8_l: max_isometric_force=40.79465 optimal_fiber_length=0.2368
        tendon_slack_length=0.0486
      PathPoint LD_T8_l_P1: humerus_l (-0.00949 -0.01525 -0.00269)
      PathPoint LD_T8_l_P2: torso (-0.081 0.215 -0.00428)
      PathWrap: wrap_object=Chest_l method=hybrid
    Millard2012EquilibriumMuscle LD_T7_l: max_isometric_force=37.07495 optimal_fiber_length=0.223
        tendon_slack_length=0.0458
      PathPoint LD_T7_l_P1: humerus_l (-0.00949 -0.01525 -0.00269)
      PathPoint LD_T7_l_P2: torso (-0.09 0.235 -0.00407)
      PathWrap: wrap_object=Chest_l method=hybrid
    Millard2012EquilibriumMuscle LD_R12_l: max_isometric_force=42.9003 optimal_fiber_length=0.2737
        tendon_slack_length=0.0562
      PathPoint LD_l12_l_P1: humerus_l (-0.00949 -0.01525 -0.00269)
      PathPoint LD_l12_l_P2: torso (-0.045 0.121579 -0.04427)
      PathWrap: wrap_object=Chest_l method=hybrid
    Millard2012EquilibriumMuscle LD_R11_l: max_isometric_force=63.33359 optimal_fiber_length=0.239
        tendon_slack_length=0.0491
      PathPoint LD_l11_l_P1: humerus_l (-0.00949 -0.01525 -0.00433)
      PathPoint LD_l11_l_P2: torso (-0.068 0.14 -0.063)
      PathWrap: wrap_object=Chest_l method=hybrid
    Millard2012EquilibriumMuscle LD_Il_l: max_isometric_force=65.36622 optimal_fiber_length=0.465
        tendon_slack_length=0.0201
      PathPoint LD_Il_l_P1: pelvis (-0.113872 0.0741306 -0.0538193)
      PathPoint LD_Il_l_P2: humerus_l (-0.00949 -0.01525 -0.00269)
      PathWrap: wrap_object=Chest_l method=hybrid
    ObjectGroup R_hip_abd
    ObjectGroup R_hip_flex
    ObjectGroup R_hip_inrot
    ObjectGroup R_hip_exrot
    ObjectGroup R_hip_ext
    ObjectGroup R_hip_add
    ObjectGroup R_knee_bend
    ObjectGroup R_knee_ext
    ObjectGroup R_ankle_pf
    ObjectGroup R_inverter
    ObjectGroup R_ankle_df
    ObjectGroup R_everter
    ObjectGroup L_hip_abd
    ObjectGroup L_hip_flex
    ObjectGroup L_hip_inrot
    ObjectGroup L_hip_exrot
    ObjectGroup L_hip_ext
    ObjectGroup L_hip_add
    ObjectGroup L_knee_bend
    ObjectGroup L_knee_ext
    ObjectGroup L_ankle_pf
    ObjectGroup L_inverter
    ObjectGroup L_ankle_df
    ObjectGroup L_everter
    ObjectGroup back_ext
    ObjectGroup back_rlb: members=(EO1_r EO2_r EO3_r EO4_r EO5_r EO6_r IO1_r IO2_r IO3_r IO4_r IO5_r IO6_r)
    ObjectGroup back_introt: members=(EO1_l EO2_l EO3_l EO4_l EO5_l EO6_l IO1_r IO2_r IO3_r IO4_r IO5_r IO6_r)
    ObjectGroup back_llb: members=(EO1_l EO2_l EO3_l EO4_l EO5_l EO6_l IO1_l IO2_l IO3_l IO4_l IO5_l IO6_l)
    ObjectGroup back_extrot: members=(EO1_r EO2_r EO3_r EO4_r EO5_r EO6_r IO1_l IO2_l IO3_l IO4_l IO5_l IO6_l)
    ObjectGroup back_flex: members=(EO1_l EO2_l EO3_l EO4_l EO5_l EO6_l EO1_r EO2_r EO3_r EO4_r EO5_r EO6_r IO1_l IO2_l IO3_l IO4_l IO5_l IO6_l IO1_r IO2_r IO3_r IO4_r IO5_r IO6_r)
    ObjectGroup quadratus_lumborum
    ObjectGroup Psoas_major: members=(Ps_L1_L2_IVD_r Ps_L2_L3_IVD_r Ps_L3_L4_IVD_r Ps_L4_L5_IVD_r Ps_L1_L2_IVD_l Ps_L2_L3_IVD_l Ps_L3_L4_IVD_l Ps_L4_L5_IVD_l Ps_L1_TP_r Ps_L2_TP_r Ps_L3_TP_r Ps_L4_TP_r Ps_L5_TP_r Ps_L1_TP_l Ps_L2_TP_l Ps_L3_TP_l Ps_L4_TP_l Ps_L5_TP_l Ps_L1_VB_r Ps_L1_VB_l Ps_L5_VB_r Ps_L5_VB_l)
    ObjectGroup Ext_Oblique: members=(EO1_l EO2_l EO3_l EO4_l EO5_l EO6_l EO1_r EO2_r EO3_r EO4_r EO5_r EO6_r)
    ObjectGroup Int_Oblique: members=(IO1_l IO2_l IO3_l IO4_l IO5_l IO6_l IO1_r IO2_r IO3_r IO4_r IO5_r IO6_r)
    ObjectGroup Rectus_Abdominis: members=(rect_abd_r rect_abd_l)
    ObjectGroup Multifidus_spinous_process: members=(MF_m1t_1_r MF_m1t_2_r MF_m1t_3_r MF_m2t_1_r MF_m2t_2_r MF_m2t_3_r MF_m3t_1_r MF_m3t_2_r MF_m3t_3_r MF_m4t_1_r MF_m4t_2_r MF_m4t_3_r MF_m5t_1_r MF_m5t_2_r MF_m5t_3_r MF_m1t_1_l MF_m1t_2_l MF_m1t_3_l MF_m2t_1_l MF_m2t_2_l MF_m2t_3_l MF_m3t_1_l MF_m3t_2_l MF_m3t_3_l MF_m4t_1_l MF_m4t_2_l MF_m4t_3_l MF_m5t_1_l MF_m5t_2_l MF_m5t_3_l MF_m1s_r MF_m2s_r MF_m3s_r MF_m4s_r MF_m5s_r MF_m1s_l MF_m2s_l MF_m3s_l MF_m4s_l MF_m5s_l)
    ObjectGroup Multifidus_entry_level: members=(MF_m1_laminar_r MF_m2_laminar_r MF_m3_laminar_r MF_m4_laminar_r MF_m5_laminar_r MF_m1_laminar_l MF_m2_laminar_l MF_m3_laminar_l MF_m4_laminar_l MF_m5_laminar_l)
    ObjectGroup iliocostalis_lumborum_pars_lumborum: members=(IL_L4_l IL_L4_r IL_L3_l IL_L3_r IL_L2_l IL_L2_r IL_L1_l IL_L1_r)
    ObjectGroup iliocostalis_lumborum_pars_thoracis_left: members=(IL_R12_l IL_R11_l IL_R10_l IL_R9_l IL_R8_l IL_R7_l IL_R6_l IL_R5_l)
    ObjectGroup iliocostalis_lumborum_pars_thoracis_right: members=(IL_R12_r IL_R11_r IL_R10_r IL_R9_r IL_R8_r IL_R7_r IL_R6_r IL_R5_r)
    ObjectGroup longissimus_thoracis_pars_thoracis_left: members=(LTpT_R12_l LTpT_R11_l LTpT_R10_l LTpT_R9_l LTpT_R8_l LTpT_R7_l LTpT_R6_l LTpT_R5_l LTpT_R4_l LTpT_T12_l LTpT_T11_l LTpT_T10_l LTpT_T9_l LTpT_T8_l LTpT_T7_l LTpT_T6_l LTpT_T5_l LTpT_T4_l LTpT_T3_l LTpT_T2_l LTpT_T1_l)
    ObjectGroup longissimus_thoracis_pars_thoracis_right: members=(LTpT_R12_r LTpT_R11_r LTpT_R10_r LTpT_R9_r LTpT_R8_r LTpT_R7_r LTpT_R6_r LTpT_R5_r LTpT_R4_r LTpT_T12_r LTpT_T11_r LTpT_T10_r LTpT_T9_r LTpT_T8_r LTpT_T7_r LTpT_T6_r LTpT_T5_r LTpT_T4_r LTpT_T3_r LTpT_T2_r LTpT_T1_r)
    ObjectGroup longissimus_thoracis_pars_lumborum: members=(LTpL_L5_r LTpL_L4_r LTpL_L3_r LTpL_L2_r LTpL_L1_r LTpL_L5_l LTpL_L4_l LTpL_L3_l LTpL_L2_l LTpL_L1_l)
    ObjectGroup Latissimus Dorsi: members=(LD_Il_l LD_Il_r LD_T7_l LD_T8_l LD_T9_l LD_T10_l LD_T11_l LD_T12_l LD_R11_l LD_R12_l LD_L1_l LD_L2_l LD_L3_l LD_L4_l LD_L5_l LD_T7_r LD_T8_r LD_T9_r LD_T10_r LD_T11_r LD_T12_r LD_R11_r LD_R12_r LD_L1_r LD_L2_r LD_L3_r LD_L4_r LD_L5_r)
