# OpenSim document version 40500
ScaleTool Vicki_Noraxon_Scaled:
  mass: 81 [kg]
  height: -1
  age: -1
  GenericModelMaker:
    model_file: LFB_model.osim
    marker_set_file: LFB_Noraxon_Markers.xml
  ModelScaler:
    apply: true
    scaling_order: measurements
    marker_file: C:\Users\VZW4\Documents\Inverse Dynamics Validation\Noraxon Data\Vicki_2024-11-22-15-16_L2R_G2L_C1.trc
    time_range: 0 0.01
    preserve_mass_distribution: true
    output_model_file: scaled.osim
    MeasurementSet:
      Measurement Pelvis X: apply=true
        MarkerPair: markers=(L.ASIS L.PSIS)
        MarkerPair: markers=(R.ASIS R.PSIS)
        BodyScale pelvis: axes=X
        BodyScale sacrum: axes=X
        BodyScale femur_r: axes=X
        BodyScale patella_r: axes=X
        BodyScale tibia_r: axes=X
        BodyScale femur_l: axes=X
        BodyScale patella_l: axes=X
        BodyScale tibia_l: axes=X
        BodyScale lumbar5: axes=X
        BodyScale lumbar4: axes=X
      Measurement Pelvis Y: apply=true
        MarkerPair: markers=(L.Acromion L.ASIS)
        MarkerPair: markers=(R.Acromion R.ASIS)
        BodyScale pelvis: axes=Y
        BodyScale sacrum: axes=Y
        BodyScale lumbar5: axes=Y
        BodyScale lumbar4: axes=Y
      Measurement Pelvis Z: apply=true
        MarkerPair: markers=(L.ASIS R.ASIS)
        MarkerPair: markers=(L.PSIS R.PSIS)
        BodyScale pelvis: axes=Z
        BodyScale sacrum: axes=Z
        BodyScale lumbar5: axes=Z
        BodyScale lumbar4: axes=Z
      Measurement Torso Y: apply=true
        MarkerPair: markers=(L.Acromion L.ASIS)
        MarkerPair: markers=(R.Acromion R.ASIS)
        BodyScale lumbar3: axes=Y
        BodyScale lumbar2: axes=Y
        BodyScale lumbar1: axes=Y
        BodyScale torso: axes=Y
        BodyScale Abdomen: axes=Y
      Measurement Femur Y: apply=true
        MarkerPair: markers=(L.ASIS L.LatKnee)
        MarkerPair: markers=(R.ASIS R.LatKnee)
        BodyScale femur_r: axes=Y
        BodyScale patella_r: axes=Y
        BodyScale femur_l: axes=Y
        BodyScale patella_l: axes=Y
      Measurement Femur Z: apply=true
        MarkerPair: markers=(L.MedKnee L.LatKnee)
        MarkerPair: markers=(R.MedKnee R.LatKnee)
        BodyScale femur_r: axes=Z
        BodyScale patella_r: axes=Z
        BodyScale femur_l: axes=Z
        BodyScale patella_l: axes=Z
      Measurement Shank Y: apply=true
        MarkerPair: markers=(L.LatKnee L.LatAnkle)
        MarkerPair: markers=(R.LatKnee R.LatAnkle)
        BodyScale tibia_r: axes=Y
        BodyScale talus_r: axes=Y
        BodyScale calcn_r: axes=Y
        BodyScale toes_r: axes=Y
        BodyScale tibia_l: axes=Y
        BodyScale talus_l: axes=Y
        BodyScale calcn_l: axes=Y
        BodyScale toes_l: axes=Y
      Measurement Shank Z: apply=true
        MarkerPair: markers=(L.LatAnkle L.MedAnkle)
        MarkerPair: markers=(R.LatAnkle R.MedAnkle)
        BodyScale tibia_r: axes=Z
        BodyScale tibia_l: axes=Z
      Measurement Foot X: apply=true
        MarkerPair: markers=(L.Toe L.Heel)
        MarkerPair: markers=(R.Toe R.Heel)
        BodyScale talus_r: axes=X
        BodyScale calcn_r: axes=X
        BodyScale toes_r: axes=X
        BodyScale talus_l: axes=X
        BodyScale calcn_l: axes=X
        BodyScale toes_l: axes=X
      Measurement Foot Z: apply=true
        MarkerPair: markers=(L.LatFoot L.MedFoot)
        MarkerPair: markers=(R.LatFoot R.MedFoot)
        BodyScale talus_r: axes=Z
        BodyScale calcn_r: axes=Z
        BodyScale toes_r: axes=Z
        BodyScale talus_l: axes=Z
        BodyScale calcn_l: axes=Z
        BodyScale toes_l: axes=Z
      Measurement Torso X: apply=true
        MarkerPair: markers=(Sternum T10)
        MarkerPair: markers=(L.Acromion L.ASIS)
        MarkerPair: markers=(R.Acromion R.ASIS)
        BodyScale lumbar3: axes=X
        BodyScale lumbar2: axes=X
        BodyScale lumbar1: axes=X
        BodyScale torso: axes=X
        BodyScale Abdomen: axes=X
      Measurement Torso Z: apply=true
        MarkerPair: markers=(L.Acromion R.Acromion)
        MarkerPair: markers=(L.Acromion L.ASIS)
        MarkerPair: markers=(R.Acromion R.ASIS)
        BodyScale lumbar3: axes=Z
        BodyScale lumbar2: axes=Z
        BodyScale lumbar1: axes=Z
        BodyScale torso: axes=Z
        BodyScale Abdomen: axes=Z
  MarkerPlacer:
    apply: true
    marker_file: C:\Users\VZW4\Documents\Inverse Dynamics Validation\Noraxon Data\Vicki_2024-11-22-15-16_L2R_G2L_C1.trc
    time_range: 0 0.01
    max_marker_movement: -1
    IKTaskSet:
      IKMarkerTask Sternum: apply=true weight=1
      IKMarkerTask R.Acromion: apply=true weight=1
      IKMarkerTask L.Acromion: apply=true weight=1
      IKMarkerTask C7: apply=false weight=1
      IKMarkerTask R.ASIS: apply=true weight=1
      IKMarkerTask L.ASIS: apply=true weight=1
      IKMarkerTask L.PSIS: apply=true weight=1
      IKMarkerTask R.LatKnee: apply=true weight=1
      IKMarkerTask R.MedKnee: apply=true weight=1
      IKMarkerTask R.LatAnkle: apply=true weight=1
      IKMarkerTask R.MedAnkle: apply=true weight=1
      IKMarkerTask R.Heel: apply=true weight=1
      IKMarkerTask R.LatFoot: apply=true weight=1
      IKMarkerTask R.MedFoot: apply=true weight=1
      IKMarkerTask R.Toe: apply=true weight=1
      IKMarkerTask L.LatKnee: apply=true weight=1
      IKMarkerTask L.MedKnee: apply=true weight=1
      IKMarkerTask L.LatAnkle: apply=true weight=1
      IKMarkerTask L.MedAnkle: apply=true weight=1
      IKMarkerTask L.Heel: apply=true weight=1
      IKMarkerTask L.LatFoot: apply=true weight=1
      IKMarkerTask L.MedFoot: apply=true weight=1
      IKMarkerTask L.Toe: apply=true weight=1
      IKMarkerTask R.PSIS: apply=true weight=1
      IKMarkerTask T10: apply=true weight=1
      IKMarkerTask JugularNotch: apply=true weight=1
