# OpenSim document version 40500
ScaleTool 3DGaitModel2354-scaled:
  mass: 81 [kg]
  height: -1
  age: -1
  GenericModelMaker:
    marker_set_file: ../../NoraxonMarkersCLOSE.xml
  ModelScaler:
    apply: true
    scaling_order: measurements
    marker_file: VickiL2R_G2G_C1_static.trc
    time_range: 0 0.198
    preserve_mass_distribution: true
    MeasurementSet:
      Measurement pelvis: apply=true
        MarkerPair: markers=(R.ASIS L.ASIS)
        MarkerPair: markers=(R.PSIS L.PSIS)
        BodyScale pelvis: axes=(X Y Z)
      Measurement femur_r: apply=true
        MarkerPair: markers=(R.ASIS R.LatKnee)
        MarkerPair: markers=(R.LatKnee R.MedKnee)
        BodyScale femur_r: axes=(X Y Z)
      Measurement femur_l: apply=true
        MarkerPair: markers=(L.ASIS L.LatKnee)
        MarkerPair: markers=(L.LatKnee L.MedKnee)
        BodyScale femur_l: axes=(X Y Z)
      Measurement tibia_r: apply=true
        MarkerPair: markers=(R.MedKnee R.MedAnkle)
        MarkerPair: markers=(R.MedKnee R.LatKnee)
        BodyScale tibia_r: axes=(X Y Z)
      Measurement tibia_l: apply=true
        MarkerPair: markers=(L.MedKnee L.MedAnkle)
        MarkerPair: markers=(L.MedKnee L.LatKnee)
        BodyScale tibia_l: axes=(X Y Z)
      Measurement calcn_r: apply=true
        MarkerPair: markers=(R.Heel R.MedFoot)
        MarkerPair: markers=(R.Heel R.LatAnkle)
        BodyScale calcn_r: axes=(X Y Z)
      Measurement calcn_l: apply=true
        MarkerPair: markers=(L.Heel L.MedFoot)
        MarkerPair: markers=(L.Heel L.LatAnkle)
        BodyScale calcn_l: axes=(X Y Z)
      Measurement talus_r: apply=true
        MarkerPair: markers=(R.MedAnkle R.LatAnkle)
        BodyScale talus_r: axes=(X Y Z)
      Measurement talus_l: apply=true
        MarkerPair: markers=(L.MedAnkle L.LatAnkle)
        BodyScale talus_l: axes=(X Y Z)
      Measurement toes_r: apply=true
        MarkerPair: markers=(R.LatFoot R.Toe)
        BodyScale toes_r: axes=(X Y Z)
      Measurement toes_l: apply=true
        MarkerPair: markers=(L.LatFoot L.Toe)
        BodyScale toes_l: axes=(X Y Z)
      Measurement torso: apply=true
        MarkerPair: markers=(Sternum T10)
        MarkerPair: markers=(JugularNotch Sternum)
        BodyScale torso: axes=(X Y Z)
  MarkerPlacer:
    apply: true
    marker_file: VickiL2R_G2G_C1_static.trc
    time_range: 0 0.198
    max_marker_movement: -1
    IKTaskSet:
      IKMarkerTask Sternum: apply=true weight=1
      IKMarkerTask R.Acromion: apply=true weight=1
      IKMarkerTask L.Acromion: apply=true weight=1
      IKMarkerTask C7: apply=true weight=1
      IKMarkerTask R.ASIS: apply=true weight=1
      IKMarkerTask L.ASIS: apply=true weight=1
      IKMarkerTask L.PSIS: apply=true weight=1
      IKMarkerTask R.LatKnee: apply=true weight=1
      IKMarkerTask R.MedKnee: apply=true weight=1
      IKMarkerTask R.LatAnkle: apply=true weight=1
      IKMarkerTask R.MedAnkle: apply=true weight=1
      IKMarkerTask R.Heel: apply=true weight=1
      IKMarkerTask R.LatFoot: apply=true weight=1
      IKMarkerTask R.MedFoot: apply=true weight=1
      IKMarkerTask R.Toe: apply=true weight=1
      IKMarkerTask L.LatKnee: apply=true weight=1
      IKMarkerTask L.MedKnee: apply=true weight=1
      IKMarkerTask L.LatAnkle: apply=true weight=1
      IKMarkerTask L.MedAnkle: apply=true weight=1
      IKMarkerTask L.Heel: apply=true weight=1
      IKMarkerTask L.LatFoot: apply=true weight=1
      IKMarkerTask L.MedFoot: apply=true weight=1
      IKMarkerTask L.Toe: apply=true weight=1
      IKMarkerTask R.PSIS: apply=true weight=1
      IKMarkerTask T10: apply=true weight=1
      IKMarkerTask JugularNotch: apply=true weight=1
